Mustashio
#Mach
0.0
#IYsym   IZsym   Zsym
0        0       0.0
#Sref    Cref    Bref
0.0456  0.178   0.128
#Xref    Yref    Zref
0.0      0.0     0.0

0.067

#=================================================
BODY
Fuselage
#Nbody  Bspace
20		1.0

TRANSLATE
-0.038  0.0  -0.043

SCALE
0.432  0.432  0.432

BFIL
fuselage_data.dat
