  <?xml VERSION="1.0"?>
  <?xml-stylesheet TYPE="text/xsl" HREF="http://jsbsim.sourceforge.net/JSBSim.xsl"?>
  <FDM_CONFIG NAME="c172" VERSION="2.0" RELEASE="BETA"
      XMLNS:XSI="http://www.w3.org/2001/XMLSchema-instance"
      XSI:NONAMESPACESCHEMALOCATION="http://jsbsim.sourceforge.net/JSBSim.xsd">
  <!--
            Cessna 172P Skyhawk 1982 (160hp) POH p.6-10, Weight and Moment:
            **Basic Empty** (= with full oil) 1467 lbs, 57300 lb-ins. Gives CG at 39.06 ins.
        -->


      <!-- integrate external-heater, thanks to HHS for allowing use-->


    <!-- Mooring setup for FlightGear. -->
    <FILEHEADER>
    <!-- experimental stall and spin, up to flat spin March 2014, Dany93 (Daniel Dubreuil) -->
        <!-- Source: http://forum.flightgear.org/viewtopic.php?f=25&t=21664&start=45 -->
        <!-- this file with comments for stall and spin to help -->
        <!-- further modifications for c172p-detailed 2015 - 2018 -->
        <!-- with help and extra informations from okroth -->
      <AUTHOR>
      Unknown
      </AUTHOR>
      <FILECREATIONDATE>
      2002-01-01
      </FILECREATIONDATE>
      <VERSION>
      $Id: c172p.xml,v 1.41 Jan 2018 $
      </VERSION>
      <DESCRIPTION>
      Cessna 172P Skyhawk
      </DESCRIPTION>
    </FILEHEADER>
    <METRICS>
      <WINGAREA UNIT="FT2">
      174
      </WINGAREA>
      <WINGSPAN UNIT="FT">
      35.8
      </WINGSPAN>
      <CHORD UNIT="FT">
      4.9
      </CHORD>
      <HTAILAREA UNIT="FT2">
      21.9
      </HTAILAREA>
      <HTAILARM UNIT="FT">
      15.7
      </HTAILARM>
      <VTAILAREA UNIT="FT2">
      16.5
      </VTAILAREA>
      <VTAILARM UNIT="FT">
      0
      </VTAILARM>
      <LOCATION NAME="AERORP" UNIT="IN">
        <X>
        40.6
        </X>
        <Y>
        0
        </Y>
        <Z>
        59.4
        </Z>
      </LOCATION>
      <LOCATION NAME="EYEPOINT" UNIT="IN">
        <X>
        37
        </X>
        <Y>
        0
        </Y>
        <Z>
        48
        </Z>
      </LOCATION>
      <LOCATION NAME="VRP" UNIT="IN">
        <X>
        42.6
        </X>
        <Y>
        0
        </Y>
        <Z>
        38.5
        </Z>
      </LOCATION>
    </METRICS>
    <MASS_BALANCE>
    <!-- Bushkits 1 to 5, pointmass [5] to [14], [15] is 180 hp engine (below) -->
        <!-- Weight and drag are managed by Systems/bushkit.xml -->


        <!-- Extra weight for the aircraft with 180 hp engine, **Basic empty** (= with full oil), pointmass [15]; managed by Systems/bushkit.xml -->
        <!-- for empty aircraft CG at x = 38.12 ins, from Cessna 172S - N552SP POH (1998) p.6-12, Weight and moment tabulation: 1642 lbs, 62600 lb-ins -->


        <!-- Loss of weight due to lacking oil, pointmass [16]. engine.nas, c172p-engine.xml -->
      <IXX UNIT="SLUG*FT2">
      948
      </IXX>
      <IYY UNIT="SLUG*FT2">
      1285
      </IYY>
      <IZZ UNIT="SLUG*FT2">
      1906
      </IZZ>
      <IXY UNIT="SLUG*FT2">
      -0
      </IXY>
      <IXZ UNIT="SLUG*FT2">
      -0
      </IXZ>
      <IYZ UNIT="SLUG*FT2">
      -0
      </IYZ>
      <EMPTYWT UNIT="LBS">
      1467
      </EMPTYWT>
      <LOCATION NAME="CG" UNIT="IN">
        <X>
        39.06
        </X>
        <Y>
        0
        </Y>
        <Z>
        36.5
        </Z>
      </LOCATION>
      <POINTMASS NAME="Pilot">
        <WEIGHT UNIT="LBS">
        180
        </WEIGHT>
        <LOCATION NAME="POINTMASS" UNIT="IN">
          <X>
          36
          </X>
          <Y>
          -14
          </Y>
          <Z>
          24
          </Z>
        </LOCATION>
      </POINTMASS>
      <POINTMASS NAME="Co-Pilot">
        <WEIGHT UNIT="LBS">
        0
        </WEIGHT>
        <LOCATION NAME="POINTMASS" UNIT="IN">
          <X>
          36
          </X>
          <Y>
          14
          </Y>
          <Z>
          24
          </Z>
        </LOCATION>
      </POINTMASS>
      <POINTMASS NAME="Left" NAME="LEFT PASSENGER"="">
        <WEIGHT UNIT="LBS">
        0
        </WEIGHT>
        <LOCATION NAME="POINTMASS" UNIT="IN">
          <X>
          70
          </X>
          <Y>
          -14
          </Y>
          <Z>
          24
          </Z>
        </LOCATION>
      </POINTMASS>
      <POINTMASS NAME="Right" NAME="RIGHT PASSENGER"="">
        <WEIGHT UNIT="LBS">
        0
        </WEIGHT>
        <LOCATION NAME="POINTMASS" UNIT="IN">
          <X>
          70
          </X>
          <Y>
          14
          </Y>
          <Z>
          24
          </Z>
        </LOCATION>
      </POINTMASS>
      <POINTMASS NAME="Baggage">
        <WEIGHT UNIT="LBS">
        0
        </WEIGHT>
        <LOCATION NAME="POINTMASS" UNIT="IN">
          <X>
          95
          </X>
          <Y>
          0
          </Y>
          <Z>
          24
          </Z>
        </LOCATION>
      </POINTMASS>
      <POINTMASS NAME="Left" NAME="LEFT BUSH WHEEL 26 INCHES"="" NAME="LEFT BUSH WHEEL 26 INCHES"="" NAME="LEFT BUSH WHEEL 26 INCHES"="" NAME="LEFT BUSH WHEEL 26 INCHES"="">
        <WEIGHT UNIT="LBS">
        0
        </WEIGHT>
        <LOCATION NAME="POINTMASS" UNIT="IN">
          <X>
          58.2
          </X>
          <Y>
          -43
          </Y>
          <Z>
          -15.5
          </Z>
        </LOCATION>
      </POINTMASS>
      <POINTMASS NAME="Right" NAME="RIGHT BUSH WHEEL 26 INCHES"="" NAME="RIGHT BUSH WHEEL 26 INCHES"="" NAME="RIGHT BUSH WHEEL 26 INCHES"="" NAME="RIGHT BUSH WHEEL 26 INCHES"="">
        <WEIGHT UNIT="LBS">
        0
        </WEIGHT>
        <LOCATION NAME="POINTMASS" UNIT="IN">
          <X>
          58.2
          </X>
          <Y>
          43
          </Y>
          <Z>
          -15.5
          </Z>
        </LOCATION>
      </POINTMASS>
      <POINTMASS NAME="Left" NAME="LEFT BUSH WHEEL 36 INCHES"="" NAME="LEFT BUSH WHEEL 36 INCHES"="" NAME="LEFT BUSH WHEEL 36 INCHES"="" NAME="LEFT BUSH WHEEL 36 INCHES"="">
        <WEIGHT UNIT="LBS">
        0
        </WEIGHT>
        <LOCATION NAME="POINTMASS" UNIT="IN">
          <X>
          58.2
          </X>
          <Y>
          -43
          </Y>
          <Z>
          -15.5
          </Z>
        </LOCATION>
      </POINTMASS>
      <POINTMASS NAME="Right" NAME="RIGHT BUSH WHEEL 36 INCHES"="" NAME="RIGHT BUSH WHEEL 36 INCHES"="" NAME="RIGHT BUSH WHEEL 36 INCHES"="" NAME="RIGHT BUSH WHEEL 36 INCHES"="">
        <WEIGHT UNIT="LBS">
        0
        </WEIGHT>
        <LOCATION NAME="POINTMASS" UNIT="IN">
          <X>
          58.2
          </X>
          <Y>
          43
          </Y>
          <Z>
          -15.5
          </Z>
        </LOCATION>
      </POINTMASS>
      <POINTMASS NAME="Left" NAME="LEFT FLOAT"="">
        <WEIGHT UNIT="LBS">
        0
        </WEIGHT>
        <LOCATION NAME="POINTMASS" UNIT="IN">
          <X>
          41
          </X>
          <Y>
          -43
          </Y>
          <Z>
          -25
          </Z>
        </LOCATION>
      </POINTMASS>
      <POINTMASS NAME="Right" NAME="RIGHT FLOAT"="">
        <WEIGHT UNIT="LBS">
        0
        </WEIGHT>
        <LOCATION NAME="POINTMASS" UNIT="IN">
          <X>
          41
          </X>
          <Y>
          43
          </Y>
          <Z>
          -25
          </Z>
        </LOCATION>
      </POINTMASS>
      <POINTMASS NAME="Left" NAME="LEFT AMPHIBIOUS"="">
        <WEIGHT UNIT="LBS">
        0
        </WEIGHT>
        <LOCATION NAME="POINTMASS" UNIT="IN">
          <X>
          41
          </X>
          <Y>
          -43
          </Y>
          <Z>
          -25
          </Z>
        </LOCATION>
      </POINTMASS>
      <POINTMASS NAME="Right" NAME="RIGHT AMPHIBIOUS"="">
        <WEIGHT UNIT="LBS">
        0
        </WEIGHT>
        <LOCATION NAME="POINTMASS" UNIT="IN">
          <X>
          41
          </X>
          <Y>
          43
          </Y>
          <Z>
          -25
          </Z>
        </LOCATION>
      </POINTMASS>
      <POINTMASS NAME="Left" NAME="LEFT SKI"="">
        <WEIGHT UNIT="LBS">
        0
        </WEIGHT>
        <LOCATION NAME="POINTMASS" UNIT="IN">
          <X>
          58.2
          </X>
          <Y>
          -43
          </Y>
          <Z>
          -15.5
          </Z>
        </LOCATION>
      </POINTMASS>
      <POINTMASS NAME="Right" NAME="RIGHT SKI"="">
        <WEIGHT UNIT="LBS">
        0
        </WEIGHT>
        <LOCATION NAME="POINTMASS" UNIT="IN">
          <X>
          58.2
          </X>
          <Y>
          43
          </Y>
          <Z>
          -15.5
          </Z>
        </LOCATION>
      </POINTMASS>
      <POINTMASS NAME="extra" NAME="EXTRA WEIGHT 180HP"="" NAME="EXTRA WEIGHT 180HP"="">
        <WEIGHT UNIT="LBS">
        0
        </WEIGHT>
        <LOCATION NAME="POINTMASS" UNIT="IN">
          <X>
          30.29
          </X>
          <Y>
          0
          </Y>
          <Z>
          26.6
          </Z>
        </LOCATION>
      </POINTMASS>
      <POINTMASS NAME="lacking" NAME="LACKING OIL WEIGHT"="" NAME="LACKING OIL WEIGHT"="">
        <WEIGHT UNIT="LBS">
        0
        </WEIGHT>
        <LOCATION NAME="POINTMASS" UNIT="IN">
          <X>
          -19.7
          </X>
          <Y>
          0
          </Y>
          <Z>
          26.6
          </Z>
        </LOCATION>
      </POINTMASS>
    </MASS_BALANCE>
    <GROUND_REACTIONS>
    <!-- Damage Mod  -->
        <!-- contact 3, 4, 5 -->


        <!-- contact 6, 7, 8 -->


        <!-- contact 9, 10, 11, 12 -->


        <!-- contact 13, 14, 15, 16, 17, 18 -->


        <!-- contact 19, 20, 21, 22 -->


        <!-- contact 23 = 2 wheels on nose ski.
             The ski wheels friction would have a
             rolling friction on a hard surface and
             slide or drag on snow -->
        <!-- contact 23, 24, 25 -->
      <DOCUMENTATION>
      The hydrodynamic interactions of the floats are modelled by
          external forces.
      </DOCUMENTATION>
      <CONTACT TYPE="BOGEY" NAME="NOSE">
        <LOCATION UNIT="IN">
          <X>
          -6.8
          </X>
          <Y>
          0
          </Y>
          <Z>
          -20.3
          </Z>
        </LOCATION>
        <STATIC_FRICTION>
        0.8
        </STATIC_FRICTION>
        <DYNAMIC_FRICTION>
        0.5
        </DYNAMIC_FRICTION>
        <ROLLING_FRICTION>
        0.02
        </ROLLING_FRICTION>
        <SPRING_COEFF UNIT="LBS/FT">
        1800
        </SPRING_COEFF>
        <DAMPING_COEFF UNIT="LBS/FT/SEC">
        600
        </DAMPING_COEFF>
        <MAX_STEER UNIT="DEG">
        10
        </MAX_STEER>
        <BRAKE_GROUP>
        NONE
        </BRAKE_GROUP>
        <RETRACTABLE>
        0
        </RETRACTABLE>
      </CONTACT>
      <CONTACT TYPE="BOGEY" NAME="LEFT_MAIN">
        <LOCATION UNIT="IN">
          <X>
          58.2
          </X>
          <Y>
          -43
          </Y>
          <Z>
          -15.3
          </Z>
        </LOCATION>
        <STATIC_FRICTION>
        0.8
        </STATIC_FRICTION>
        <DYNAMIC_FRICTION>
        0.5
        </DYNAMIC_FRICTION>
        <ROLLING_FRICTION>
        0.02
        </ROLLING_FRICTION>
        <SPRING_COEFF UNIT="LBS/FT">
        5400
        </SPRING_COEFF>
        <DAMPING_COEFF UNIT="LBS/FT/SEC">
        400
        </DAMPING_COEFF>
        <MAX_STEER UNIT="DEG">
        0.0
        </MAX_STEER>
        <BRAKE_GROUP>
        LEFT
        </BRAKE_GROUP>
        <RETRACTABLE>
        0
        </RETRACTABLE>
      </CONTACT>
      <CONTACT TYPE="BOGEY" NAME="RIGHT_MAIN">
        <LOCATION UNIT="IN">
          <X>
          58.2
          </X>
          <Y>
          43
          </Y>
          <Z>
          -15.1
          </Z>
        </LOCATION>
        <STATIC_FRICTION>
        0.8
        </STATIC_FRICTION>
        <DYNAMIC_FRICTION>
        0.5
        </DYNAMIC_FRICTION>
        <ROLLING_FRICTION>
        0.02
        </ROLLING_FRICTION>
        <SPRING_COEFF UNIT="LBS/FT">
        5400
        </SPRING_COEFF>
        <DAMPING_COEFF UNIT="LBS/FT/SEC">
        400
        </DAMPING_COEFF>
        <MAX_STEER UNIT="DEG">
        0.0
        </MAX_STEER>
        <BRAKE_GROUP>
        RIGHT
        </BRAKE_GROUP>
        <RETRACTABLE>
        0
        </RETRACTABLE>
      </CONTACT>
      <CONTACT TYPE="STRUCTURE" NAME="TAIL_SKID">
        <LOCATION UNIT="IN">
          <X>
          226.7
          </X>
          <Y>
          0
          </Y>
          <Z>
          17
          </Z>
        </LOCATION>
        <STATIC_FRICTION>
        0.5
        </STATIC_FRICTION>
        <DYNAMIC_FRICTION>
        0.25
        </DYNAMIC_FRICTION>
        <SPRING_COEFF UNIT="LBS/FT">
        2000
        </SPRING_COEFF>
        <DAMPING_COEFF UNIT="LBS/FT/SEC">
        1000
        </DAMPING_COEFF>
      </CONTACT>
      <CONTACT TYPE="STRUCTURE" NAME="LEFT_TIP">
        <LOCATION UNIT="IN">
          <X>
          20
          </X>
          <Y>
          -232
          </Y>
          <Z>
          50
          </Z>
        </LOCATION>
        <STATIC_FRICTION>
        0.75
        </STATIC_FRICTION>
        <DYNAMIC_FRICTION>
        0.5
        </DYNAMIC_FRICTION>
        <SPRING_COEFF UNIT="LBS/FT">
        1830.15
        </SPRING_COEFF>
        <DAMPING_COEFF UNIT="LBS/FT/SEC">
        366.03
        </DAMPING_COEFF>
      </CONTACT>
      <CONTACT TYPE="STRUCTURE" NAME="RIGHT_TIP">
        <LOCATION UNIT="IN">
          <X>
          20
          </X>
          <Y>
          232
          </Y>
          <Z>
          50
          </Z>
        </LOCATION>
        <STATIC_FRICTION>
        0.75
        </STATIC_FRICTION>
        <DYNAMIC_FRICTION>
        0.5
        </DYNAMIC_FRICTION>
        <SPRING_COEFF UNIT="LBS/FT">
        1830.15
        </SPRING_COEFF>
        <DAMPING_COEFF UNIT="LBS/FT/SEC">
        366.03
        </DAMPING_COEFF>
      </CONTACT>
      <CONTACT TYPE="STRUCTURE" NAME="FRONT_BROKEN_GEAR">
        <LOCATION UNIT="IN">
          <X>
          -6.8
          </X>
          <Y>
          0
          </Y>
          <Z>
          0
          </Z>
        </LOCATION>
        <STATIC_FRICTION>
        0.9
        </STATIC_FRICTION>
        <DYNAMIC_FRICTION>
        0.5
        </DYNAMIC_FRICTION>
        <SPRING_COEFF UNIT="LBS/FT">
        1830.15
        </SPRING_COEFF>
        <DAMPING_COEFF UNIT="LBS/FT/SEC">
        366.03
        </DAMPING_COEFF>
      </CONTACT>
      <CONTACT TYPE="STRUCTURE" NAME="LEFT_BROKEN_GEAR">
        <LOCATION UNIT="IN">
          <X>
          58.2
          </X>
          <Y>
          -48
          </Y>
          <Z>
          0
          </Z>
        </LOCATION>
        <STATIC_FRICTION>
        0.8
        </STATIC_FRICTION>
        <DYNAMIC_FRICTION>
        0.4
        </DYNAMIC_FRICTION>
        <SPRING_COEFF UNIT="LBS/FT">
        1830.15
        </SPRING_COEFF>
        <DAMPING_COEFF UNIT="LBS/FT/SEC">
        366.03
        </DAMPING_COEFF>
      </CONTACT>
      <CONTACT TYPE="STRUCTURE" NAME="RIGHT_BROKEN_GEAR">
        <LOCATION UNIT="IN">
          <X>
          58.2
          </X>
          <Y>
          48
          </Y>
          <Z>
          0
          </Z>
        </LOCATION>
        <STATIC_FRICTION>
        0.8
        </STATIC_FRICTION>
        <DYNAMIC_FRICTION>
        0.4
        </DYNAMIC_FRICTION>
        <SPRING_COEFF UNIT="LBS/FT">
        1830.15
        </SPRING_COEFF>
        <DAMPING_COEFF UNIT="LBS/FT/SEC">
        366.03
        </DAMPING_COEFF>
      </CONTACT>
      <CONTACT TYPE="STRUCTURE" NAME="NOSE_TOP">
        <LOCATION UNIT="IN">
          <X>
          -119
          </X>
          <Y>
          0
          </Y>
          <Z>
          35
          </Z>
        </LOCATION>
        <STATIC_FRICTION>
        .75
        </STATIC_FRICTION>
        <DYNAMIC_FRICTION>
        .5
        </DYNAMIC_FRICTION>
        <SPRING_COEFF UNIT="LBS/FT">
        1830.15
        </SPRING_COEFF>
        <DAMPING_COEFF UNIT="LBS/FT/SEC">
        366.03
        </DAMPING_COEFF>
      </CONTACT>
      <CONTACT TYPE="STRUCTURE" NAME="NOSE">
        <LOCATION UNIT="IN">
          <X>
          -119
          </X>
          <Y>
          0
          </Y>
          <Z>
          8
          </Z>
        </LOCATION>
        <STATIC_FRICTION>
        3.0
        </STATIC_FRICTION>
        <DYNAMIC_FRICTION>
        2.0
        </DYNAMIC_FRICTION>
        <SPRING_COEFF UNIT="LBS/FT">
        1830.15
        </SPRING_COEFF>
        <DAMPING_COEFF UNIT="LBS/FT/SEC">
        366.03
        </DAMPING_COEFF>
      </CONTACT>
      <CONTACT TYPE="STRUCTURE" NAME="COCKPIT_TOP">
        <LOCATION UNIT="IN">
          <X>
          -4.7
          </X>
          <Y>
          0
          </Y>
          <Z>
          60
          </Z>
        </LOCATION>
        <STATIC_FRICTION>
        3.0
        </STATIC_FRICTION>
        <DYNAMIC_FRICTION>
        2.0
        </DYNAMIC_FRICTION>
        <SPRING_COEFF UNIT="LBS/FT">
        1830.15
        </SPRING_COEFF>
        <DAMPING_COEFF UNIT="LBS/FT/SEC">
        366.03
        </DAMPING_COEFF>
      </CONTACT>
      <CONTACT TYPE="STRUCTURE" NAME="TOP_VS">
        <LOCATION UNIT="IN">
          <X>
          253.5
          </X>
          <Y>
          0
          </Y>
          <Z>
          90
          </Z>
        </LOCATION>
        <STATIC_FRICTION>
        3.0
        </STATIC_FRICTION>
        <DYNAMIC_FRICTION>
        2.0
        </DYNAMIC_FRICTION>
        <SPRING_COEFF UNIT="LBS/FT">
        1830.15
        </SPRING_COEFF>
        <DAMPING_COEFF UNIT="LBS/FT/SEC">
        366.03
        </DAMPING_COEFF>
      </CONTACT>
      <CONTACT TYPE="STRUCTURE" NAME="LFfloat">
        <LOCATION UNIT="IN">
          <X>
          3.230
          </X>
          <Y>
          -56.889
          </Y>
          <Z>
          38.5
          </Z>
        </LOCATION>
        <STATIC_FRICTION>
        0.5
        </STATIC_FRICTION>
        <DYNAMIC_FRICTION>
        0.2
        </DYNAMIC_FRICTION>
        <SPRING_COEFF UNIT="LBS/FT">
        1830.15
        </SPRING_COEFF>
        <DAMPING_COEFF UNIT="LBS/FT/SEC">
        366.03
        </DAMPING_COEFF>
      </CONTACT>
      <CONTACT TYPE="STRUCTURE" NAME="RFfloat">
        <LOCATION UNIT="IN">
          <X>
          3.230
          </X>
          <Y>
          56.889
          </Y>
          <Z>
          38.5
          </Z>
        </LOCATION>
        <STATIC_FRICTION>
        0.5
        </STATIC_FRICTION>
        <DYNAMIC_FRICTION>
        0.2
        </DYNAMIC_FRICTION>
        <SPRING_COEFF UNIT="LBS/FT">
        1830.15
        </SPRING_COEFF>
        <DAMPING_COEFF UNIT="LBS/FT/SEC">
        366.03
        </DAMPING_COEFF>
      </CONTACT>
      <CONTACT TYPE="STRUCTURE" NAME="LMfloat">
        <LOCATION UNIT="IN">
          <X>
          70.16
          </X>
          <Y>
          -56.889
          </Y>
          <Z>
          38.5
          </Z>
        </LOCATION>
        <STATIC_FRICTION>
        0.5
        </STATIC_FRICTION>
        <DYNAMIC_FRICTION>
        0.2
        </DYNAMIC_FRICTION>
        <SPRING_COEFF UNIT="LBS/FT">
        1830.15
        </SPRING_COEFF>
        <DAMPING_COEFF UNIT="LBS/FT/SEC">
        366.03
        </DAMPING_COEFF>
      </CONTACT>
      <CONTACT TYPE="STRUCTURE" NAME="RMfloat">
        <LOCATION UNIT="IN">
          <X>
          70.16
          </X>
          <Y>
          56.889
          </Y>
          <Z>
          38.5
          </Z>
        </LOCATION>
        <STATIC_FRICTION>
        0.5
        </STATIC_FRICTION>
        <DYNAMIC_FRICTION>
        0.2
        </DYNAMIC_FRICTION>
        <SPRING_COEFF UNIT="LBS/FT">
        1830.15
        </SPRING_COEFF>
        <DAMPING_COEFF UNIT="LBS/FT/SEC">
        366.03
        </DAMPING_COEFF>
      </CONTACT>
      <CONTACT TYPE="STRUCTURE" NAME="LRfloat">
        <LOCATION UNIT="IN">
          <X>
          160.71
          </X>
          <Y>
          -56.889
          </Y>
          <Z>
          38.5
          </Z>
        </LOCATION>
        <STATIC_FRICTION>
        0.5
        </STATIC_FRICTION>
        <DYNAMIC_FRICTION>
        0.2
        </DYNAMIC_FRICTION>
        <SPRING_COEFF UNIT="LBS/FT">
        1830.15
        </SPRING_COEFF>
        <DAMPING_COEFF UNIT="LBS/FT/SEC">
        366.03
        </DAMPING_COEFF>
      </CONTACT>
      <CONTACT TYPE="STRUCTURE" NAME="RRfloat">
        <LOCATION UNIT="IN">
          <X>
          160.71
          </X>
          <Y>
          56.889
          </Y>
          <Z>
          38.5
          </Z>
        </LOCATION>
        <STATIC_FRICTION>
        0.5
        </STATIC_FRICTION>
        <DYNAMIC_FRICTION>
        0.2
        </DYNAMIC_FRICTION>
        <SPRING_COEFF UNIT="LBS/FT">
        1830.15
        </SPRING_COEFF>
        <DAMPING_COEFF UNIT="LBS/FT/SEC">
        366.03
        </DAMPING_COEFF>
      </CONTACT>
      <CONTACT TYPE="BOGEY" NAME="LFFloatGear">
        <LOCATION UNIT="IN">
          <X>
          -78
          </X>
          <Y>
          -56.889
          </Y>
          <Z>
          0
          </Z>
        </LOCATION>
        <STATIC_FRICTION>
        0.05
        </STATIC_FRICTION>
        <DYNAMIC_FRICTION>
        0.05
        </DYNAMIC_FRICTION>
        <ROLLING_FRICTION>
        0.02
        </ROLLING_FRICTION>
        <SPRING_COEFF UNIT="LBS/FT">
        1000
        </SPRING_COEFF>
        <DAMPING_COEFF UNIT="LBS/FT/SEC">
        600
        </DAMPING_COEFF>
        <MAX_STEER UNIT="DEG">
        360
        </MAX_STEER>
        <BRAKE_GROUP>
        NONE
        </BRAKE_GROUP>
        <RETRACTABLE>
        1
        </RETRACTABLE>
      </CONTACT>
      <CONTACT TYPE="BOGEY" NAME="RFFloatGear">
        <LOCATION UNIT="IN">
          <X>
          -78
          </X>
          <Y>
          56.889
          </Y>
          <Z>
          0
          </Z>
        </LOCATION>
        <STATIC_FRICTION>
        0.05
        </STATIC_FRICTION>
        <DYNAMIC_FRICTION>
        0.05
        </DYNAMIC_FRICTION>
        <ROLLING_FRICTION>
        0.02
        </ROLLING_FRICTION>
        <SPRING_COEFF UNIT="LBS/FT">
        1000
        </SPRING_COEFF>
        <DAMPING_COEFF UNIT="LBS/FT/SEC">
        600
        </DAMPING_COEFF>
        <MAX_STEER UNIT="DEG">
        360
        </MAX_STEER>
        <BRAKE_GROUP>
        NONE
        </BRAKE_GROUP>
        <RETRACTABLE>
        1
        </RETRACTABLE>
      </CONTACT>
      <CONTACT TYPE="BOGEY" NAME="LMFloatGear">
        <LOCATION UNIT="IN">
          <X>
          76
          </X>
          <Y>
          -56.889
          </Y>
          <Z>
          0
          </Z>
        </LOCATION>
        <STATIC_FRICTION>
        0.80
        </STATIC_FRICTION>
        <DYNAMIC_FRICTION>
        0.50
        </DYNAMIC_FRICTION>
        <ROLLING_FRICTION>
        0.02
        </ROLLING_FRICTION>
        <SPRING_COEFF UNIT="LBS/FT">
        5400
        </SPRING_COEFF>
        <DAMPING_COEFF UNIT="LBS/FT/SEC">
        1600
        </DAMPING_COEFF>
        <MAX_STEER UNIT="DEG">
        0
        </MAX_STEER>
        <BRAKE_GROUP>
        LEFT
        </BRAKE_GROUP>
        <RETRACTABLE>
        1
        </RETRACTABLE>
      </CONTACT>
      <CONTACT TYPE="BOGEY" NAME="RMFloatGear">
        <LOCATION UNIT="IN">
          <X>
          76
          </X>
          <Y>
          56.889
          </Y>
          <Z>
          0
          </Z>
        </LOCATION>
        <STATIC_FRICTION>
        0.80
        </STATIC_FRICTION>
        <DYNAMIC_FRICTION>
        0.50
        </DYNAMIC_FRICTION>
        <ROLLING_FRICTION>
        0.02
        </ROLLING_FRICTION>
        <SPRING_COEFF UNIT="LBS/FT">
        5400
        </SPRING_COEFF>
        <DAMPING_COEFF UNIT="LBS/FT/SEC">
        1600
        </DAMPING_COEFF>
        <MAX_STEER UNIT="DEG">
        0
        </MAX_STEER>
        <BRAKE_GROUP>
        RIGHT
        </BRAKE_GROUP>
        <RETRACTABLE>
        1
        </RETRACTABLE>
      </CONTACT>
      <CONTACT TYPE="BOGEY" NAME="NOSE_SKI">
        <LOCATION UNIT="IN">
          <X>
          18.44
          </X>
          <Y>
          0
          </Y>
          <Z>
          -10
          </Z>
        </LOCATION>
        <STATIC_FRICTION>
        0.8
        </STATIC_FRICTION>
        <DYNAMIC_FRICTION>
        0.5
        </DYNAMIC_FRICTION>
        <ROLLING_FRICTION>
        0.02
        </ROLLING_FRICTION>
        <SPRING_COEFF UNIT="LBS/FT">
        1800
        </SPRING_COEFF>
        <DAMPING_COEFF UNIT="LBS/FT/SEC">
        600
        </DAMPING_COEFF>
        <MAX_STEER UNIT="DEG">
        10
        </MAX_STEER>
        <BRAKE_GROUP>
        NONE
        </BRAKE_GROUP>
        <RETRACTABLE>
        0
        </RETRACTABLE>
      </CONTACT>
      <CONTACT TYPE="BOGEY" NAME="LEFT_SKI">
        <LOCATION UNIT="IN">
          <X>
          93
          </X>
          <Y>
          -51
          </Y>
          <Z>
          -10
          </Z>
        </LOCATION>
        <STATIC_FRICTION>
        0.8
        </STATIC_FRICTION>
        <DYNAMIC_FRICTION>
        0.5
        </DYNAMIC_FRICTION>
        <ROLLING_FRICTION>
        0.02
        </ROLLING_FRICTION>
        <SPRING_COEFF UNIT="LBS/FT">
        5400
        </SPRING_COEFF>
        <DAMPING_COEFF UNIT="LBS/FT/SEC">
        400
        </DAMPING_COEFF>
        <MAX_STEER UNIT="DEG">
        0.0
        </MAX_STEER>
        <BRAKE_GROUP>
        NONE
        </BRAKE_GROUP>
        <RETRACTABLE>
        0
        </RETRACTABLE>
      </CONTACT>
      <CONTACT TYPE="BOGEY" NAME="RIGHT_SKI">
        <LOCATION UNIT="IN">
          <X>
          93
          </X>
          <Y>
          52
          </Y>
          <Z>
          -10
          </Z>
        </LOCATION>
        <STATIC_FRICTION>
        0.8
        </STATIC_FRICTION>
        <DYNAMIC_FRICTION>
        0.5
        </DYNAMIC_FRICTION>
        <ROLLING_FRICTION>
        0.02
        </ROLLING_FRICTION>
        <SPRING_COEFF UNIT="LBS/FT">
        5400
        </SPRING_COEFF>
        <DAMPING_COEFF UNIT="LBS/FT/SEC">
        400
        </DAMPING_COEFF>
        <MAX_STEER UNIT="DEG">
        0.0
        </MAX_STEER>
        <BRAKE_GROUP>
        NONE
        </BRAKE_GROUP>
        <RETRACTABLE>
        0
        </RETRACTABLE>
      </CONTACT>
    </GROUND_REACTIONS>
    <PROPULSION>
    <!-- Tank number 0 -->


        <!-- Tank number 1 -->


        <!-- Tank number 2, Float chamber  -->


        <!-- Tank number 3, Float chamber  -->
      <ENGINE FILE="eng_io320">
      <!-- from intermediate tank (float chamber 2) -->
        <LOCATION UNIT="IN">
          <X>
          -19.7
          </X>
          <Y>
          0
          </Y>
          <Z>
          26.6
          </Z>
        </LOCATION>
        <ORIENT UNIT="DEG">
          <ROLL>
          0.0
          </ROLL>
          <PITCH>
          0
          </PITCH>
          <YAW>
          0
          </YAW>
        </ORIENT>
        <FEED>
        2
        </FEED>
        <THRUSTER FILE="prop_75in2f">
          <LOCATION UNIT="IN">
            <X>
            -37.7
            </X>
            <Y>
            0
            </Y>
            <Z>
            26.6
            </Z>
          </LOCATION>
          <ORIENT UNIT="DEG">
            <ROLL>
            0.0
            </ROLL>
            <PITCH>
            0.0
            </PITCH>
            <YAW>
            0.0
            </YAW>
          </ORIENT>
          <SENSE>
          1
          </SENSE>
          <P_FACTOR>
          5
          </P_FACTOR>
        </THRUSTER>
      </ENGINE>
      <ENGINE FILE="eng_io360">
      <!-- from intermediate tank (float chamber 3) -->
        <LOCATION UNIT="IN">
          <X>
          -19.7
          </X>
          <Y>
          0
          </Y>
          <Z>
          26.6
          </Z>
        </LOCATION>
        <ORIENT UNIT="DEG">
          <ROLL>
          0.0
          </ROLL>
          <PITCH>
          0
          </PITCH>
          <YAW>
          0
          </YAW>
        </ORIENT>
        <FEED>
        3
        </FEED>
        <THRUSTER FILE="prop_76in2f_NACA_20deg">
          <LOCATION UNIT="IN">
            <X>
            -37.7
            </X>
            <Y>
            0
            </Y>
            <Z>
            26.6
            </Z>
          </LOCATION>
          <ORIENT UNIT="DEG">
            <ROLL>
            0.0
            </ROLL>
            <PITCH>
            0.0
            </PITCH>
            <YAW>
            0.0
            </YAW>
          </ORIENT>
          <SENSE>
          1
          </SENSE>
          <P_FACTOR>
          5
          </P_FACTOR>
        </THRUSTER>
      </ENGINE>
      <TANK TYPE="FUEL">
        <LOCATION UNIT="IN">
          <X>
          56
          </X>
          <Y>
          -112
          </Y>
          <Z>
          59.4
          </Z>
        </LOCATION>
        <CAPACITY UNIT="LBS">
        129.43
        </CAPACITY>
        <CONTENTS UNIT="LBS">
        100.0
        </CONTENTS>
        <TYPE>
        AVGAS
        </TYPE>
      </TANK>
      <TANK TYPE="FUEL">
        <LOCATION UNIT="IN">
          <X>
          56
          </X>
          <Y>
          112
          </Y>
          <Z>
          59.4
          </Z>
        </LOCATION>
        <CAPACITY UNIT="LBS">
        129.43
        </CAPACITY>
        <CONTENTS UNIT="LBS">
        100.0
        </CONTENTS>
        <TYPE>
        AVGAS
        </TYPE>
      </TANK>
      <TANK TYPE="FUEL">
        <LOCATION UNIT="IN">
          <X>
          56
          </X>
          <Y>
          0
          </Y>
          <Z>
          59.4
          </Z>
        </LOCATION>
        <CAPACITY UNIT="LBS">
        0.1
        </CAPACITY>
        <CONTENTS UNIT="LBS">
        0.0
        </CONTENTS>
        <PRIORITY>
        1
        </PRIORITY>
        <TYPE>
        AVGAS
        </TYPE>
      </TANK>
      <TANK TYPE="FUEL">
        <LOCATION UNIT="IN">
          <X>
          56
          </X>
          <Y>
          0
          </Y>
          <Z>
          59.4
          </Z>
        </LOCATION>
        <CAPACITY UNIT="LBS">
        0.1
        </CAPACITY>
        <CONTENTS UNIT="LBS">
        0.0
        </CONTENTS>
        <PRIORITY>
        1
        </PRIORITY>
        <TYPE>
        AVGAS
        </TYPE>
      </TANK>
    </PROPULSION>
    <FLIGHT_CONTROL NAME="FCS:" NAME="FCS: C172"="">
      <CHANNEL NAME="Pitch">
        <KINEMATIC NAME="fcs/elevator-cmd-norm-filtered">
          <INPUT>
          fcs/elevator-cmd-norm
          </INPUT>
          <TRAVERSE>
            <SETTING>
              <POSITION>
              -1
              </POSITION>
              <TIME>
              0
              </TIME>
            </SETTING>
            <SETTING>
              <POSITION>
              1
              </POSITION>
              <TIME>
              0.15
              </TIME>
            </SETTING>
          </TRAVERSE>
          <OUTPUT>
          /sim/model/c172p/cockpit/yoke-elevator
          </OUTPUT>
        </KINEMATIC>
        <SUMMER NAME="Pitch" NAME="PITCH TRIM SUM"="" NAME="PITCH TRIM SUM"="">
          <INPUT>
          fcs/elevator-cmd-norm-filtered
          </INPUT>
          <INPUT>
          fcs/pitch-trim-cmd-norm
          </INPUT>
          <CLIPTO>
            <MIN>
            -1
            </MIN>
            <MAX>
            1
            </MAX>
          </CLIPTO>
        </SUMMER>
        <AEROSURFACE_SCALE NAME="Elevator" NAME="ELEVATOR CONTROL"="">
          <INPUT>
          fcs/pitch-trim-sum
          </INPUT>
          <GAIN>
          0.01745
          </GAIN>
          <RANGE>
            <MIN>
            -28
            </MIN>
            <MAX>
            23
            </MAX>
          </RANGE>
          <OUTPUT>
          fcs/elevator-pos-rad
          </OUTPUT>
        </AEROSURFACE_SCALE>
        <AEROSURFACE_SCALE NAME="Elevator" NAME="ELEVATOR POSITION NORMALIZED"="" NAME="ELEVATOR POSITION NORMALIZED"="">
          <INPUT>
          fcs/elevator-pos-deg
          </INPUT>
          <DOMAIN>
            <MIN>
            -28
            </MIN>
            <MAX>
            23
            </MAX>
          </DOMAIN>
          <RANGE>
            <MIN>
            -1
            </MIN>
            <MAX>
            1
            </MAX>
          </RANGE>
          <OUTPUT>
          fcs/elevator-pos-norm
          </OUTPUT>
        </AEROSURFACE_SCALE>
      </CHANNEL>
      <CHANNEL NAME="Roll">
        <KINEMATIC NAME="fcs/aileron-cmd-norm-filtered">
          <INPUT>
          fcs/aileron-cmd-norm
          </INPUT>
          <TRAVERSE>
            <SETTING>
              <POSITION>
              -1
              </POSITION>
              <TIME>
              0
              </TIME>
            </SETTING>
            <SETTING>
              <POSITION>
              1
              </POSITION>
              <TIME>
              0.15
              </TIME>
            </SETTING>
          </TRAVERSE>
          <OUTPUT>
          /sim/model/c172p/cockpit/yoke-aileron
          </OUTPUT>
        </KINEMATIC>
        <SUMMER NAME="Roll" NAME="ROLL TRIM SUM"="" NAME="ROLL TRIM SUM"="">
          <INPUT>
          fcs/aileron-cmd-norm-filtered
          </INPUT>
          <INPUT>
          fcs/roll-trim-cmd-norm
          </INPUT>
          <CLIPTO>
            <MIN>
            -1
            </MIN>
            <MAX>
            1
            </MAX>
          </CLIPTO>
        </SUMMER>
        <AEROSURFACE_SCALE NAME="Left" NAME="LEFT AILERON CONTROL"="" NAME="LEFT AILERON CONTROL"="">
          <INPUT>
          fcs/roll-trim-sum
          </INPUT>
          <GAIN>
          0.01745
          </GAIN>
          <RANGE>
            <MIN>
            -20
            </MIN>
            <MAX>
            15
            </MAX>
          </RANGE>
          <OUTPUT>
          fcs/left-aileron-pos-rad
          </OUTPUT>
        </AEROSURFACE_SCALE>
        <AEROSURFACE_SCALE NAME="Left" NAME="LEFT AILERON POSITION NORMALIZED"="" NAME="LEFT AILERON POSITION NORMALIZED"="" NAME="LEFT AILERON POSITION NORMALIZED"="">
          <INPUT>
          fcs/left-aileron-pos-deg
          </INPUT>
          <DOMAIN>
            <MIN>
            -20
            </MIN>
            <MAX>
            15
            </MAX>
          </DOMAIN>
          <RANGE>
            <MIN>
            -1
            </MIN>
            <MAX>
            1
            </MAX>
          </RANGE>
          <OUTPUT>
          fcs/left-aileron-pos-norm
          </OUTPUT>
        </AEROSURFACE_SCALE>
        <AEROSURFACE_SCALE NAME="Right" NAME="RIGHT AILERON CONTROL"="" NAME="RIGHT AILERON CONTROL"="">
          <INPUT>
          -fcs/roll-trim-sum
          </INPUT>
          <GAIN>
          0.01745
          </GAIN>
          <RANGE>
            <MIN>
            -20
            </MIN>
            <MAX>
            15
            </MAX>
          </RANGE>
          <OUTPUT>
          fcs/right-aileron-pos-rad
          </OUTPUT>
        </AEROSURFACE_SCALE>
        <AEROSURFACE_SCALE NAME="Right" NAME="RIGHT AILERON POSITION NORMALIZED"="" NAME="RIGHT AILERON POSITION NORMALIZED"="" NAME="RIGHT AILERON POSITION NORMALIZED"="">
          <INPUT>
          fcs/right-aileron-pos-deg
          </INPUT>
          <DOMAIN>
            <MIN>
            -20
            </MIN>
            <MAX>
            15
            </MAX>
          </DOMAIN>
          <RANGE>
            <MIN>
            1
            </MIN>
            <MAX>
            -1
            </MAX>
          </RANGE>
          <OUTPUT>
          fcs/right-aileron-pos-norm
          </OUTPUT>
        </AEROSURFACE_SCALE>
      </CHANNEL>
      <CHANNEL NAME="Yaw">
        <KINEMATIC NAME="fcs/rudder-cmd-norm-filtered">
          <INPUT>
          fcs/rudder-cmd-norm
          </INPUT>
          <TRAVERSE>
            <SETTING>
              <POSITION>
              -1
              </POSITION>
              <TIME>
              0
              </TIME>
            </SETTING>
            <SETTING>
              <POSITION>
              1
              </POSITION>
              <TIME>
              0.15
              </TIME>
            </SETTING>
          </TRAVERSE>
          <OUTPUT>
          /sim/model/c172p/cockpit/pedals-rudder
          </OUTPUT>
        </KINEMATIC>
        <SUMMER NAME="Yaw" NAME="YAW TRIM SUM"="" NAME="YAW TRIM SUM"="">
          <INPUT>
          fcs/rudder-cmd-norm-filtered
          </INPUT>
          <INPUT>
          fcs/yaw-trim-cmd-norm
          </INPUT>
          <CLIPTO>
            <MIN>
            -1
            </MIN>
            <MAX>
            1
            </MAX>
          </CLIPTO>
        </SUMMER>
        <AEROSURFACE_SCALE NAME="Rudder" NAME="RUDDER CONTROL"="">
          <INPUT>
          fcs/yaw-trim-sum
          </INPUT>
          <GAIN>
          0.01745
          </GAIN>
          <RANGE>
            <MIN>
            -16
            </MIN>
            <MAX>
            16
            </MAX>
          </RANGE>
          <OUTPUT>
          fcs/rudder-pos-rad
          </OUTPUT>
        </AEROSURFACE_SCALE>
        <AEROSURFACE_SCALE NAME="Rudder" NAME="RUDDER POSITION NORMALIZED"="" NAME="RUDDER POSITION NORMALIZED"="">
          <INPUT>
          fcs/rudder-pos-deg
          </INPUT>
          <DOMAIN>
            <MIN>
            -16
            </MIN>
            <MAX>
            16
            </MAX>
          </DOMAIN>
          <RANGE>
            <MIN>
            -1
            </MIN>
            <MAX>
            1
            </MAX>
          </RANGE>
          <OUTPUT>
          fcs/rudder-pos-norm
          </OUTPUT>
        </AEROSURFACE_SCALE>
      </CHANNEL>
      <CHANNEL NAME="Flaps">
      <!-- Disable flap movement if electrical voltage is too low -->
        <SWITCH NAME="Flaps" NAME="FLAPS COMMAND"="">
        <!-- Route back the (normalized) output of the kinematic
                     to its input in order to disable it.
                -->
          <default VALUE="fcs/flap-cmd-norm"/>
          <OUTPUT>
          fcs/flap-input-norm
          </OUTPUT>
          <TEST LOGIC="AND" VALUE="fcs/flap-pos-norm">
          /systems/electrical/outputs/flaps le 16
          </TEST>
        </SWITCH>
        <KINEMATIC NAME="Flaps" NAME="FLAPS CONTROL"="">
          <INPUT>
          fcs/flap-input-norm
          </INPUT>
          <TRAVERSE>
            <SETTING>
              <POSITION>
              0
              </POSITION>
              <TIME>
              0
              </TIME>
            </SETTING>
            <SETTING>
              <POSITION>
              10
              </POSITION>
              <TIME>
              2
              </TIME>
            </SETTING>
            <SETTING>
              <POSITION>
              20
              </POSITION>
              <TIME>
              1
              </TIME>
            </SETTING>
            <SETTING>
              <POSITION>
              30
              </POSITION>
              <TIME>
              1
              </TIME>
            </SETTING>
          </TRAVERSE>
          <OUTPUT>
          fcs/flap-pos-deg
          </OUTPUT>
        </KINEMATIC>
        <AEROSURFACE_SCALE NAME="Flap" NAME="FLAP POSITION NORMALIZER"="" NAME="FLAP POSITION NORMALIZER"="">
          <INPUT>
          fcs/flap-pos-deg
          </INPUT>
          <DOMAIN>
          <!-- Flaps actual minimum position -->
                      <!-- Flaps actual maximum position -->
            <MIN>
            0
            </MIN>
            <MAX>
            30
            </MAX>
          </DOMAIN>
          <RANGE>
          <!-- Flaps normalized minimum position -->
                      <!-- Flaps normalized maximum position -->
            <MIN>
            0
            </MIN>
            <MAX>
            1
            </MAX>
          </RANGE>
          <OUTPUT>
          fcs/flap-pos-norm
          </OUTPUT>
        </AEROSURFACE_SCALE>
        <KINEMATIC NAME="Flaps" NAME="FLAPS LEVER"="">
          <INPUT>
          /controls/flight/flaps
          </INPUT>
          <TRAVERSE>
            <SETTING>
              <POSITION>
              0
              </POSITION>
              <TIME>
              0
              </TIME>
            </SETTING>
            <SETTING>
              <POSITION>
              1
              </POSITION>
              <TIME>
              1
              </TIME>
            </SETTING>
          </TRAVERSE>
          <OUTPUT>
          /sim/model/c172p/cockpit/flaps-lever
          </OUTPUT>
        </KINEMATIC>
      </CHANNEL>
      <CHANNEL NAME="Mixture">
      <!-- If the engine was primed enough times and throttle
                 is in starter position, then mixture is 1.
            -->


            <!-- Primer logic for 160 HP engine -->


            <!-- Primer logic for 180 HP engine -->
        <FCS_FUNCTION NAME="fcs/mixture-primer-cmd">
          <FUNCTION>
            <TABLE>
              <INDEPENDENTVAR LOOKUP="row">
              /controls/engines/engine/primer
              </INDEPENDENTVAR>
              <INDEPENDENTVAR LOOKUP="column">
              /controls/engines/current-engine/throttle
              </INDEPENDENTVAR>
              <TABLEDATA>
              0.09    0.1    0.5    0.51
                            2    0       0      0      0
                            3    0       1      1      0
                            4    0       1      1      0
                            5    0       1      1      0
                            6    0       1      1      0
                            7    0       0      0      0
              </TABLEDATA>
            </TABLE>
          </FUNCTION>
        </FCS_FUNCTION>
        <PURE_GAIN NAME="fcs/mixture-primer[0]">
          <INPUT>
          fcs/mixture-cmd-norm[0]
          </INPUT>
          <GAIN>
          fcs/mixture-primer-cmd
          </GAIN>
        </PURE_GAIN>
        <PURE_GAIN NAME="fcs/mixture-primer[1]">
          <INPUT>
          fcs/mixture-cmd-norm[1]
          </INPUT>
          <GAIN>
          fcs/mixture-primer-cmd
          </GAIN>
        </PURE_GAIN>
        <SWITCH NAME="Mixture" NAME="MIXTURE POSITION 160 HP"="" NAME="MIXTURE POSITION 160 HP"="" NAME="MIXTURE POSITION 160 HP"="">
        <!-- Use primer if used and engine is cold. If engine
                     is warm, then the mixture lever is used.
                -->
          <default VALUE="fcs/mixture-cmd-norm[0]"/>
          <OUTPUT>
          fcs/mixture-pos-norm[0]
          </OUTPUT>
          <TEST LOGIC="AND" VALUE="fcs/mixture-primer[0]">
          /controls/engines/engine/use-primer eq 1
                    /engines/engine[0]/oil-temperature-degf le 75
          </TEST>
        </SWITCH>
        <SWITCH NAME="Mixture" NAME="MIXTURE POSITION 180 HP"="" NAME="MIXTURE POSITION 180 HP"="" NAME="MIXTURE POSITION 180 HP"="">
        <!-- Use primer if used and engine is cold. If engine
                     is warm, then the mixture lever is used.
                -->
          <default VALUE="fcs/mixture-cmd-norm[1]"/>
          <OUTPUT>
          fcs/mixture-pos-norm[1]
          </OUTPUT>
          <TEST LOGIC="AND" VALUE="fcs/mixture-primer[1]">
          /controls/engines/engine/use-primer eq 1
                    /engines/engine[1]/oil-temperature-degf le 75
          </TEST>
        </SWITCH>
      </CHANNEL>
      <CHANNEL NAME="Landing" NAME="LANDING GEAR"="">
      <!-- Disable gear movement if electrical voltage is too low -->
        <SWITCH NAME="Gear" NAME="GEAR COMMAND"="">
        <!-- Route back the (normalized) output of the kinematic
                     to its input in order to disable it.
                -->
          <default VALUE="gear/gear-cmd-norm"/>
          <OUTPUT>
          gear/gear-input-norm
          </OUTPUT>
          <TEST LOGIC="AND" VALUE="gear/gear-pos-norm">
          /systems/electrical/outputs/instrument-lights le 20.0
          </TEST>
        </SWITCH>
        <KINEMATIC NAME="Gr">
          <INPUT>
          gear/gear-input-norm
          </INPUT>
          <TRAVERSE>
            <SETTING>
              <POSITION>
              0
              </POSITION>
              <TIME>
              0
              </TIME>
            </SETTING>
            <SETTING>
              <POSITION>
              1
              </POSITION>
              <TIME>
              5
              </TIME>
            </SETTING>
          </TRAVERSE>
          <OUTPUT>
          gear/gear-pos-norm
          </OUTPUT>
        </KINEMATIC>
        <KINEMATIC NAME="/controls/gear/water-rudder-down">
          <INPUT>
          /controls/gear/water-rudder
          </INPUT>
          <TRAVERSE>
            <SETTING>
              <POSITION>
              0
              </POSITION>
              <TIME>
              0
              </TIME>
            </SETTING>
            <SETTING>
              <POSITION>
              1
              </POSITION>
              <TIME>
              1
              </TIME>
            </SETTING>
          </TRAVERSE>
        </KINEMATIC>
      </CHANNEL>
    </FLIGHT_CONTROL>
    <AERODYNAMICS>
      <ALPHALIMITS UNIT="RAD">
        <MIN>
        -0.087
        </MIN>
        <MAX>
        0.28
        </MAX>
      </ALPHALIMITS>
      <HYSTERESIS_LIMITS UNIT="RAD">
        <MIN>
        0.15
        </MIN>
        <MAX>
        0.297
        </MAX>
      </HYSTERESIS_LIMITS>
      <FUNCTION NAME="aero/function/kCDge">
        <DESCRIPTION>
        Change_in_drag_due_to_ground_effect
        </DESCRIPTION>
        <PRODUCT>
          <TABLE>
            <INDEPENDENTVAR>
            aero/h_b-mac-ft
            </INDEPENDENTVAR>
            <TABLEDATA>
            0.0000    0.4800
                          0.1000    0.5150
                          0.1500    0.6290
                          0.2000    0.7090
                          0.3000    0.8150
                          0.4000    0.8820
                          0.5000    0.9280
                          0.6000    0.9620
                          0.7000    0.9880
                          0.8000    1.0000
                          0.9000    1.0000
                          1.0000    1.0000
                          1.1000    1.0000
            </TABLEDATA>
          </TABLE>
        </PRODUCT>
      </FUNCTION>
      <FUNCTION NAME="aero/function/kCLge">
        <DESCRIPTION>
        Change_in_lift_due_to_ground_effect
        </DESCRIPTION>
        <PRODUCT>
          <TABLE>
            <INDEPENDENTVAR>
            aero/h_b-mac-ft
            </INDEPENDENTVAR>
            <TABLEDATA>
            0.0000    1.2030
                          0.1000    1.1270
                          0.1500    1.0900
                          0.2000    1.0730
                          0.3000    1.0460
                          0.4000    1.0280
                          0.5000    1.0190
                          0.6000    1.0130
                          0.7000    1.0080
                          0.8000    1.0060
                          0.9000    1.0030
                          1.0000    1.0020
                          1.1000    1.0000
            </TABLEDATA>
          </TABLE>
        </PRODUCT>
      </FUNCTION>
      <FUNCTION NAME="aero/function/kCXblfl">
        <DESCRIPTION>
        Change_in_CX_due_to_blowing_and_flaps
        </DESCRIPTION>
        <PRODUCT>
          <TABLE>
          <!-- Possibly might want blowing-pos-norm instead-->
            <INDEPENDENTVAR LOOKUP="row">
            aero/cj
            </INDEPENDENTVAR>
            <INDEPENDENTVAR LOOKUP="column">
            aero/flap-pos-deg
            </INDEPENDENTVAR>
            <TABLEDATA>
            10.0000   20.0000   30.0000   40.0000   50.0000   60.0000   70.0000   80.0000
                        0    0.2683000 0.3687000 0.4878000 0.6227000 0.7720000 0.9349000 1.1114000 1.3019000
                        0.5  0.1725900 0.2900200 0.4278800 0.5821600 0.7504800 0.9319100 1.1264100 1.3343900
                        1    0.0543800 0.1860600 0.3393200 0.5088800 0.6915900 0.8862100 1.0927000 1.3116000
                        1.5  -0.076580 0.0684100 0.2359600 0.4194500 0.6149800 0.8210200 1.0375200 1.2651700
                        2    -0.216290 -0.058460 0.1227800 0.3195100 0.5270600 0.7436100 0.9691100 1.2043700
                        2.5  -0.362500 -0.192120 0.0024600 0.2120200 0.4311100 0.6576100 0.8915000 1.1337100
                        3    -0.513800 -0.331040 -0.123350 0.0987600 0.3290800 0.5651900 0.8070600 1.0557900
                        3.5  -0.669200 -0.474190 -0.253540 -0.019060 0.2222700 0.4677500 0.7173400 0.9722900
                        4    -0.828010 -0.620830 -0.387320 -0.140600 0.1116000 0.3662700 0.6233900 0.8843500
                        4.5  -0.989690 -0.770400 -0.524110 -0.265230 -0.002280 0.2614700 0.5259800 0.7928000
                        5    -1.153860 -0.922500 -0.663470 -0.392500 -0.118860 0.1538700 0.4256900 0.6982600
                        5.5  -1.320190 -1.076780 -0.805040 -0.522020 -0.237750 0.0439100 0.3229500 0.6012000
                        6    -1.488420 -1.232970 -0.948550 -0.653510 -0.358650 -0.068110 0.2181100 0.5019800
                        6.5  -1.658340 -1.390860 -1.093760 -0.786720 -0.481290 -0.181900 0.1114500 0.4009000
                        7    -1.829770 -1.550260 -1.240500 -0.921450 -0.605470 -0.297260 0.0032000 0.2982000
                        7.5  -2.002570 -1.711030 -1.388580 -1.057550 -0.731020 -0.414000 -0.106440 0.1940700
                        8    -2.176610 -1.873020 -1.537900 -1.194860 -0.857790 -0.531970 -0.217340 0.0886900
                        8.5  -2.351790 -2.036140 -1.688320 -1.333280 -0.985670 -0.651040 -0.329340 -0.017810
                        9    -2.528000 -2.200280 -1.839750 -1.472690 -1.114530 -0.771100 -0.442330 -0.125310
                        9.5  -2.705170 -2.365360 -1.992100 -1.613020 -1.244290 -0.892060 -0.556220 -0.233710
                        10   -2.883230 -2.531300 -2.145290 -1.754170 -1.374880 -1.013840 -0.670930 -0.342920
                        10.5 -3.062100 -2.698040 -2.299260 -1.896070 -1.506200 -1.136350 -0.786370 -0.452870
                        11   -3.241740 -2.865520 -2.453950 -2.038680 -1.638220 -1.259530 -0.902470 -0.563480
                        11.5 -3.422100 -3.033690 -2.609310 -2.181930 -1.770850 -1.383340 -1.019190 -0.674710
                        12   -3.603110 -3.202500 -2.765270 -2.325770 -1.904060 -1.507700 -1.136470 -0.786480
                        12.5 -3.784760 -3.371910 -2.921810 -2.470150 -2.037800 -1.632580 -1.254250 -0.898760
                        13   -3.966990 -3.541880 -3.078880 -2.615050 -2.172030 -1.757940 -1.372500 -1.011500
                        13.5 -4.149770 -3.712380 -3.236440 -2.760410 -2.306710 -1.883730 -1.491180 -1.124670
                        14   -4.333080 -3.883370 -3.394470 -2.906200 -2.441790 -2.009920 -1.610250 -1.238220
                        14.5 -4.516880 -4.054820 -3.552930 -3.052400 -2.577260 -2.136470 -1.729670 -1.352130
                        15   -4.701150 -4.226710 -3.711790 -3.198970 -2.713080 -2.263360 -1.849430 -1.466360
                        15.5 -4.885870 -4.399010 -3.871030 -3.345890 -2.849220 -2.390560 -1.969480 -1.580890
                        16   -5.071000 -4.571700 -4.030620 -3.493120 -2.985660 -2.518030 -2.089800 -1.695680
                        16.5 -5.256540 -4.744760 -4.190540 -3.640660 -3.122370 -2.645760 -2.210360 -1.810710
                        17   -5.442450 -4.918170 -4.350770 -3.788470 -3.259320 -2.773720 -2.331150 -1.925970
                        17.5 -5.628730 -5.091900 -4.511290 -3.936530 -3.396500 -2.901890 -2.452140 -2.041420
                        18   -5.815360 -5.265940 -4.672080 -4.084830 -3.533890 -3.030240 -2.573300 -2.157050
                        18.5 -6.002310 -5.440280 -4.833130 -4.233340 -3.671460 -3.158760 -2.694620 -2.272830
                        19   -6.189580 -5.614890 -4.994400 -4.382040 -3.809200 -3.287420 -2.816070 -2.388740
                        19.5 -6.377160 -5.789770 -5.155900 -4.530930 -3.947080 -3.416210 -2.937630 -2.504760
                        20   -6.565020 -5.964900 -5.317610 -4.679970 -4.085080 -3.545100 -3.059290 -2.620880
            </TABLEDATA>
          </TABLE>
        </PRODUCT>
      </FUNCTION>
      <FUNCTION NAME="aero/function/kCLblfl">
        <DESCRIPTION>
        Change_in_CL_due_to_blowing_and_flaps
        </DESCRIPTION>
        <PRODUCT>
          <TABLE>
          <!-- Possibly might want blowing-pos-norm instead-->
            <INDEPENDENTVAR LOOKUP="row">
            aero/cj
            </INDEPENDENTVAR>
            <INDEPENDENTVAR LOOKUP="column">
            aero/flap-pos-deg
            </INDEPENDENTVAR>
            <TABLEDATA>
            10.0000   20.0000   30.0000   40.0000   50.0000   60.0000   70.0000   80.0000
                        0    2.450760 2.871680 3.280880 3.678780 4.066640 4.445870 4.817660 5.182910
                        0.5  2.687630 3.157260 3.611420 4.050730 4.477080 4.892530 5.298860 5.697410
                        1    2.879450 3.386800 3.875110 4.345200 4.799570 5.240960 5.671720 6.093630
                        1.5  3.053340 3.593940 4.111990 4.608520 5.086620 5.549720 6.000730 6.441880
                        2    3.216450 3.787590 4.332700 4.853010 5.352220 5.834430 6.303130 6.760990
                        2.5  3.372090 3.971870 4.542160 5.084390 5.602860 6.102360 6.586960 7.059730
                        3    3.522120 4.149120 4.743180 5.305920 5.842280 6.357690 6.856800 7.343130
                        3.5  3.667760 4.320850 4.937550 5.519710 6.072830 6.603060 7.115620 7.614430
                        4    3.809830 4.488090 5.126520 5.727180 6.296190 6.840340 7.365440 7.875860
                        4.5  3.948920 4.651590 5.310990 5.929400 6.513530 7.070870 7.607770 8.129050
                        5    4.085500 4.811920 5.491640 6.127150 6.725770 7.295650 7.843720 8.375240
                        5.5  4.219910 4.969520 5.669010 6.321060 6.933610 7.515470 8.074170 8.615370
                        6    4.352440 5.124740 5.843500 6.511610 7.137600 7.730980 8.299830 8.850230
                        6.5  4.483300 5.277870 6.015470 6.699200 7.338220 7.942680 8.521240 9.080440
                        7    4.612700 5.429140 6.185200 6.884170 7.535830 8.150990 8.738900 9.306500
                        7.5  4.740780 5.578750 6.352920 7.066790 7.730740 8.356270 8.953180 9.528850
                        8    4.867670 5.726870 6.518840 7.247300 7.923230 8.558820 9.164430 9.747870
                        8.5  4.993500 5.873630 6.683120 7.425880 8.113530 8.758900 9.372920 9.963850
                        9    5.118350 6.019160 6.845910 7.602730 8.301820 8.956720 9.578910 10.177080
                        9.5  5.242320 6.163570 7.007340 7.777970 8.488290 9.152480 9.782610 10.387790
                        10   5.365470 6.306950 7.167520 7.951760 8.673080 9.346340 9.984200 10.596180
                        10.5 5.487870 6.449380 7.326560 8.124190 8.856320 9.538470 10.183850 10.802430
                        11   5.609590 6.590940 7.484530 8.295380 9.038120 9.728970 10.381710 11.006710
                        11.5 5.730660 6.731680 7.641520 8.465400 9.218600 9.917980 10.577900 11.209160
                        12   5.851150 6.871670 7.797590 8.634360 9.397840 10.105600 10.772540 11.409900
                        12.5 5.971080 7.010960 7.952810 8.802300 9.575940 10.291920 10.965740 11.609060
                        13   6.090490 7.149590 8.107230 8.969310 9.752950 10.477030 11.157590 11.806730
                        13.5 6.209430 7.287610 8.260900 9.135440 9.928950 10.660990 11.348170 12.003010
                        14   6.327910 7.425050 8.413880 9.300750 10.104010 10.843890 11.537570 12.197990
                        14.5 6.445970 7.561950 8.566190 9.465270 10.278170 11.025770 11.725840 12.391730
                        15   6.563630 7.698340 8.717880 9.629070 10.451480 11.206710 11.913060 12.584310
                        15.5 6.680920 7.834250 8.868990 9.792170 10.624000 11.386750 12.099280 12.775800
                        16   6.797850 7.969710 9.019530 9.954610 10.795770 11.565930 12.284550 12.966250
                        16.5 6.914450 8.104740 9.169560 10.116430 10.966810 11.744310 12.468930 13.155720
                        17   7.030730 8.239360 9.319080 10.277660 11.137180 11.921920 12.652450 13.344250
                        17.5 7.146710 8.373590 9.468130 10.438330 11.306900 12.098800 12.835170 13.531890
                        18   7.262410 8.507460 9.616720 10.598460 11.476000 12.274980 13.017110 13.718690
                        18.5 7.377840 8.640980 9.764880 10.758070 11.644500 12.450490 13.198310 13.904680
                        19   7.493010 8.774160 9.912630 10.917200 11.812450 12.625370 13.378800 14.089890
                        19.5 7.607930 8.907020 10.059990 11.075850 11.979840 12.799630 13.558620 14.274360
                        20   7.722620 9.039580 10.206970 11.234060 12.146720 12.973310 13.737780 14.458120
            </TABLEDATA>
          </TABLE>
        </PRODUCT>
      </FUNCTION>
      <FUNCTION NAME="aero/function/vel-propwash-fps">
        <DESCRIPTION>
        propeller induced velocity
        </DESCRIPTION>
        <SUM>
          <PROPERTY>
          propulsion/engine/prop-induced-velocity_fps
          </PROPERTY>
          <PROPERTY>
          propulsion/engine[1]/prop-induced-velocity_fps
          </PROPERTY>
        </SUM>
      </FUNCTION>
      <FUNCTION NAME="aero/function/qbar-propwash-psf">
        <DESCRIPTION>
        q bar due to the propeller induced velocity
        </DESCRIPTION>
        <PRODUCT>
          <PROPERTY>
          aero/function/vel-propwash-fps
          </PROPERTY>
          <PROPERTY>
          aero/function/vel-propwash-fps
          </PROPERTY>
          <PROPERTY>
          atmosphere/rho-slugs_ft3
          </PROPERTY>
          <VALUE>
          0.5
          </VALUE>
        </PRODUCT>
      </FUNCTION>
      <FUNCTION NAME="aero/function/velocity-induced-fps">
        <DESCRIPTION>
        velocity including the propulsion induced velocity.
        </DESCRIPTION>
        <SUM>
          <PROPERTY>
          velocities/u-aero-fps
          </PROPERTY>
          <PROPERTY>
          propulsion/engine/prop-induced-velocity_fps
          </PROPERTY>
          <PROPERTY>
          propulsion/engine[1]/prop-induced-velocity_fps
          </PROPERTY>
        </SUM>
      </FUNCTION>
      <FUNCTION NAME="aero/function/qbar-induced-psf">
        <DESCRIPTION>
        q bar including the propulsion induced velocity.
        </DESCRIPTION>
        <PRODUCT>
          <PROPERTY>
          aero/function/velocity-induced-fps
          </PROPERTY>
          <PROPERTY>
          aero/function/velocity-induced-fps
          </PROPERTY>
          <PROPERTY>
          atmosphere/rho-slugs_ft3
          </PROPERTY>
          <VALUE>
          0.5
          </VALUE>
        </PRODUCT>
      </FUNCTION>
      <FUNCTION NAME="aero/function/total-wing-damage">
        <DESCRIPTION>
        Total damage on wings
        </DESCRIPTION>
        <PRODUCT>
          <SUM>
            <PROPERTY>
            wing-damage/left-wing
            </PROPERTY>
            <PROPERTY>
            wing-damage/right-wing
            </PROPERTY>
          </SUM>
          <VALUE>
          0.5
          </VALUE>
        </PRODUCT>
      </FUNCTION>
      <FUNCTION NAME="fcs/aileron-pos-rad-avgd">
        <DESCRIPTION>
        Averaged aileron position
        </DESCRIPTION>
        <AVG>
          <PROPERTY>
          fcs/left-aileron-pos-rad
          </PROPERTY>
          <PRODUCT>
            <PROPERTY>
            fcs/right-aileron-pos-rad
            </PROPERTY>
            <VALUE>
            -1
            </VALUE>
          </PRODUCT>
        </AVG>
      </FUNCTION>
      <AXIS NAME="DRAG">
        <FUNCTION NAME="aero/coefficient/CDo">
          <DESCRIPTION>
          Drag_at_zero_lift
          </DESCRIPTION>
          <PRODUCT>
          <!-- bush wheels 26" -->
                      <!-- bush wheels 36" -->
                      <!-- Floats -->
                      <!-- Amphibious -->
                      <!-- Ski -->
                      <!-- Amphibious gear extended -->
            <PROPERTY>
            aero/qbar-psf
            </PROPERTY>
            <PROPERTY>
            metrics/Sw-sqft
            </PROPERTY>
            <VALUE>
            0.027
            </VALUE>
            <PROPERTY>
            gear/drag-coef[1]
            </PROPERTY>
            <PROPERTY>
            gear/drag-coef[2]
            </PROPERTY>
            <PROPERTY>
            gear/drag-coef[3]
            </PROPERTY>
            <PROPERTY>
            gear/drag-coef[4]
            </PROPERTY>
            <PROPERTY>
            gear/drag-coef[5]
            </PROPERTY>
            <PROPERTY>
            gear/drag-coef[6]
            </PROPERTY>
          </PRODUCT>
        </FUNCTION>
        <FUNCTION NAME="aero/coefficient/CDDf">
          <DESCRIPTION>
          Delta_drag_due_to_flap_deflection
          </DESCRIPTION>
          <PRODUCT>
            <PROPERTY>
            aero/qbar-psf
            </PROPERTY>
            <PROPERTY>
            metrics/Sw-sqft
            </PROPERTY>
            <PROPERTY>
            aero/function/kCDge
            </PROPERTY>
            <TABLE>
              <INDEPENDENTVAR>
              fcs/flap-pos-deg
              </INDEPENDENTVAR>
              <TABLEDATA>
              0.0000    0.0000
                              10.0000   0.0070
                              20.0000   0.0120
                              30.0000   0.0180
              </TABLEDATA>
            </TABLE>
          </PRODUCT>
        </FUNCTION>
        <FUNCTION NAME="aero/coefficient/CDwbh">
          <DESCRIPTION>
          Drag_due_to_alpha
          </DESCRIPTION>
          <PRODUCT>
          <!-- Amphibious gear extended -->
            <PROPERTY>
            aero/qbar-psf
            </PROPERTY>
            <PROPERTY>
            metrics/Sw-sqft
            </PROPERTY>
            <PROPERTY>
            aero/function/kCDge
            </PROPERTY>
            <TABLE>
              <INDEPENDENTVAR LOOKUP="row">
              aero/alpha-rad
              </INDEPENDENTVAR>
              <INDEPENDENTVAR LOOKUP="column">
              fcs/flap-pos-deg
              </INDEPENDENTVAR>
              <TABLEDATA>
              0        10       20       30
                             -0.0873   0.0041   0        0.0005    0.0014
                             -0.0698   0.0013   0.0004   0.0025    0.0041
                             -0.0524   0.0001   0.0023   0.0059    0.0084
                             -0.0349   0.0003   0.0057   0.0108    0.0141
                             -0.0175   0.002    0.0105   0.0172    0.0212
                             0.0000    0.0052   0.0168   0.0251    0.0299
                             0.0175    0.0099   0.0248   0.0346    0.0402
                             0.0349    0.0162   0.0342   0.0457    0.0521
                             0.0524    0.024    0.0452   0.0583    0.0655
                             0.0698    0.0334   0.0577   0.0724    0.0804
                             0.0873    0.0442   0.0718   0.0881    0.0968
                             0.1047    0.0566   0.0874   0.1053    0.1148
                             0.1222    0.0706   0.1045   0.124     0.1343
                             0.1396    0.086    0.1232   0.1442    0.1554
                             0.1571    0.0962   0.1353   0.1573    0.169
                             0.1745    0.1069   0.1479   0.1708    0.183
                             0.1920    0.118    0.161    0.1849    0.1975
                             0.2094    0.1298   0.1746   0.1995    0.2126
                             0.2269    0.1424   0.1892   0.2151    0.2286
                             0.2443    0.1565   0.2054   0.2323    0.2464
                             0.3491    0.2537   0.3298   0.3755    0.3983
                             0.5236    0.45     0.585    0.666     0.7065
                             0.6981    0.7      0.91     1.036     1.099
                             0.8727    1        1.3      1.48      1.57
                             1.0472    1.35     1.755    1.998     2.1195
                             1.2217    1.5      1.95     2.22      2.355
                             1.3963    1.57     2.041    2.3236    2.4649
                             1.5710    1.6      2.08     2.368     2.512
              </TABLEDATA>
            </TABLE>
            <PROPERTY>
            gear/drag-coef[1]
            </PROPERTY>
            <PROPERTY>
            gear/drag-coef[2]
            </PROPERTY>
            <PROPERTY>
            gear/drag-coef[3]
            </PROPERTY>
            <PROPERTY>
            gear/drag-coef[4]
            </PROPERTY>
            <PROPERTY>
            gear/drag-coef[5]
            </PROPERTY>
            <PROPERTY>
            gear/drag-coef[6]
            </PROPERTY>
          </PRODUCT>
        </FUNCTION>
        <FUNCTION NAME="aero/coefficient/CDDe">
          <DESCRIPTION>
          Drag_due_to_Elevator_Deflection
          </DESCRIPTION>
          <PRODUCT>
            <PROPERTY>
            aero/qbar-psf
            </PROPERTY>
            <PROPERTY>
            metrics/Sw-sqft
            </PROPERTY>
            <PROPERTY>
            fcs/mag-elevator-pos-rad
            </PROPERTY>
            <VALUE>
            0.0000
            </VALUE>
          </PRODUCT>
        </FUNCTION>
        <FUNCTION NAME="aero/coefficient/CDbeta">
          <DESCRIPTION>
          Drag_due_to_sideslip
          </DESCRIPTION>
          <PRODUCT>
          <!-- Amphibious gear extended -->
            <PROPERTY>
            aero/qbar-psf
            </PROPERTY>
            <PROPERTY>
            metrics/Sw-sqft
            </PROPERTY>
            <PROPERTY>
            aero/mag-beta-rad
            </PROPERTY>
            <VALUE>
            0.1500
            </VALUE>
            <PROPERTY>
            gear/drag-coef[1]
            </PROPERTY>
            <PROPERTY>
            gear/drag-coef[2]
            </PROPERTY>
            <PROPERTY>
            gear/drag-coef[3]
            </PROPERTY>
            <PROPERTY>
            gear/drag-coef[4]
            </PROPERTY>
            <PROPERTY>
            gear/drag-coef[5]
            </PROPERTY>
            <PROPERTY>
            gear/drag-coef[6]
            </PROPERTY>
          </PRODUCT>
        </FUNCTION>
      </AXIS>
      <AXIS NAME="SIDE">
        <FUNCTION NAME="aero/coefficient/CYb">
          <DESCRIPTION>
          Side_force_due_to_beta
          </DESCRIPTION>
          <PRODUCT>
            <PROPERTY>
            aero/qbar-psf
            </PROPERTY>
            <PROPERTY>
            metrics/Sw-sqft
            </PROPERTY>
            <TABLE>
              <INDEPENDENTVAR LOOKUP="row">
              aero/beta-rad
              </INDEPENDENTVAR>
              <INDEPENDENTVAR LOOKUP="column">
              fcs/flap-pos-deg
              </INDEPENDENTVAR>
              <TABLEDATA>
              0.0000   30.0000
                             -0.3490   0.1370   0.1060
                              0.0000   0.0000   0.0000
                              0.3490  -0.1370  -0.1060
              </TABLEDATA>
            </TABLE>
          </PRODUCT>
        </FUNCTION>
        <FUNCTION NAME="aero/coefficient/CYdr">
          <DESCRIPTION>
          Side_force_due_to_rudder
          </DESCRIPTION>
          <PRODUCT>
            <PROPERTY>
            aero/qbar-psf
            </PROPERTY>
            <PROPERTY>
            metrics/Sw-sqft
            </PROPERTY>
            <PROPERTY>
            fcs/rudder-pos-rad
            </PROPERTY>
            <VALUE>
            0.150
            </VALUE>
          </PRODUCT>
        </FUNCTION>
      </AXIS>
      <AXIS NAME="LIFT">
        <FUNCTION NAME="aero/coefficient/CLbl">
        <!--Lift_due_to_blowing_and_flaps-->
          <DESCRIPTION>
          Lift_from_blowing_and_flaps
          </DESCRIPTION>
          <PRODUCT>
            <PROPERTY>
            aero/function/kCLblfl
            </PROPERTY>
          </PRODUCT>
        </FUNCTION>
        <FUNCTION NAME="aero/coefficient/CLwbh">
        <!--Lift_due_to_alpha-->
          <DESCRIPTION>
          Lift_due_to_alpha
          </DESCRIPTION>
          <PRODUCT>
            <VALUE>
            10.0
            </VALUE>
            <PROPERTY>
            aero/qbar-psf
            </PROPERTY>
            <PROPERTY>
            metrics/Sw-sqft
            </PROPERTY>
            <PROPERTY>
            aero/function/kCLge
            </PROPERTY>
            <TABLE>
              <INDEPENDENTVAR LOOKUP="row">
              aero/alpha-rad
              </INDEPENDENTVAR>
              <INDEPENDENTVAR LOOKUP="column">
              aero/stall-hyst-norm
              </INDEPENDENTVAR>
              <TABLEDATA>
              0.00    1.00
                             -0.09   -0.22   -0.22
                              0.00    0.25    0.25
                              0.09    0.73    0.73
                              0.10    0.83    0.78
                              0.12    0.92    0.79
                              0.14    1.02    0.81
                              0.16    1.08    0.82
                              0.17    1.13    0.83
                              0.19    1.19    0.85
                              0.21    1.25    0.86
                              0.24    1.35    0.88
                              0.26    1.44    0.90
                              0.28    1.47    0.92
                              0.30    1.43    0.95
                              0.32    1.38    0.99
                              0.34    1.30    1.05
                              0.36    1.15    1.15
                              0.52    1.47    1.47
                              0.70    1.65    1.65
                              0.87    1.47    1.47
                              1.05    1.17    1.17
                              1.57    0.01    0.01
              </TABLEDATA>
            </TABLE>
            <TABLE>
              <INDEPENDENTVAR>
              aero/function/total-wing-damage
              </INDEPENDENTVAR>
              <TABLEDATA>
              0.0000    1
                              1.0000    0
              </TABLEDATA>
            </TABLE>
          </PRODUCT>
        </FUNCTION>
        <FUNCTION NAME="aero/coefficient/CLDf">
        <!--Delta_lift_due_to_flap_deflection-->
          <DESCRIPTION>
          Delta_lift_due_to_flap_deflection
          </DESCRIPTION>
          <PRODUCT>
            <PROPERTY>
            aero/qbar-psf
            </PROPERTY>
            <PROPERTY>
            metrics/Sw-sqft
            </PROPERTY>
            <PROPERTY>
            aero/function/kCLge
            </PROPERTY>
            <TABLE>
              <INDEPENDENTVAR>
              fcs/flap-pos-deg
              </INDEPENDENTVAR>
              <TABLEDATA>
              0.0000  0.0000
                            10.0000 0.2000
                            20.0000 0.3000
                            30.0000 0.3500
              </TABLEDATA>
            </TABLE>
          </PRODUCT>
        </FUNCTION>
        <FUNCTION NAME="aero/coefficient/CLDe">
        <!--Lift_due_to_Elevator_Deflection-->
          <DESCRIPTION>
          Lift_due_to_Elevator_Deflection
          </DESCRIPTION>
          <PRODUCT>
            <PROPERTY>
            aero/qbar-psf
            </PROPERTY>
            <PROPERTY>
            metrics/Sw-sqft
            </PROPERTY>
            <PROPERTY>
            fcs/elevator-pos-rad
            </PROPERTY>
            <VALUE>
            0.4300
            </VALUE>
          </PRODUCT>
        </FUNCTION>
        <FUNCTION NAME="aero/coefficient/CLadot">
        <!--Lift_due_to_alpha_rate-->
          <DESCRIPTION>
          Lift_due_to_alpha_rate
          </DESCRIPTION>
          <PRODUCT>
            <PROPERTY>
            aero/qbar-psf
            </PROPERTY>
            <PROPERTY>
            metrics/Sw-sqft
            </PROPERTY>
            <PROPERTY>
            aero/alphadot-rad_sec
            </PROPERTY>
            <PROPERTY>
            aero/ci2vel
            </PROPERTY>
            <VALUE>
            1.7000
            </VALUE>
          </PRODUCT>
        </FUNCTION>
        <FUNCTION NAME="aero/coefficient/CLq">
        <!--Lift_due_to_pitch_rate-->
          <DESCRIPTION>
          Lift_due_to_pitch_rate
          </DESCRIPTION>
          <PRODUCT>
            <PROPERTY>
            aero/qbar-psf
            </PROPERTY>
            <PROPERTY>
            metrics/Sw-sqft
            </PROPERTY>
            <PROPERTY>
            velocities/q-aero-rad_sec
            </PROPERTY>
            <PROPERTY>
            aero/ci2vel
            </PROPERTY>
            <VALUE>
            3.9000
            </VALUE>
          </PRODUCT>
        </FUNCTION>
      </AXIS>
      <AXIS NAME="ROLL">
        <FUNCTION NAME="aero/coefficient/Clb">
          <DESCRIPTION>
          Roll_moment_due_to_beta
          </DESCRIPTION>
          <PRODUCT>
          <!--
                          stall and spin (1):
                          via diedra effect.
                          Makes the higher (downwind) wing drop at forward slip
                          and worsens the spin in a skidding turn.
                          But if too great, prevents the spin departure in a slipping turn
                    -->
            <PROPERTY>
            aero/qbar-psf
            </PROPERTY>
            <PROPERTY>
            metrics/Sw-sqft
            </PROPERTY>
            <PROPERTY>
            metrics/bw-ft
            </PROPERTY>
            <PROPERTY>
            aero/beta-rad
            </PROPERTY>
            <VALUE>
            -0.092
            </VALUE>
            <TABLE>
              <INDEPENDENTVAR LOOKUP="row">
              aero/alpha-wing-rad
              </INDEPENDENTVAR>
              <TABLEDATA>
              0.279     1
                            0.297     3.5
              </TABLEDATA>
            </TABLE>
          </PRODUCT>
        </FUNCTION>
        <FUNCTION NAME="aero/coefficient/Clp">
          <DESCRIPTION>
          Roll_moment_due_to_roll_rate_(roll_damping)
          </DESCRIPTION>
          <PRODUCT>
            <PROPERTY>
            aero/qbar-psf
            </PROPERTY>
            <PROPERTY>
            metrics/Sw-sqft
            </PROPERTY>
            <PROPERTY>
            metrics/bw-ft
            </PROPERTY>
            <PROPERTY>
            aero/bi2vel
            </PROPERTY>
            <PROPERTY>
            velocities/p-aero-rad_sec
            </PROPERTY>
            <VALUE>
            -0.484
            </VALUE>
          </PRODUCT>
        </FUNCTION>
        <FUNCTION NAME="aero/coefficient/Clr">
          <DESCRIPTION>
          Roll_moment_due_to_yaw_rate
          </DESCRIPTION>
          <PRODUCT>
            <PROPERTY>
            aero/qbar-psf
            </PROPERTY>
            <PROPERTY>
            metrics/Sw-sqft
            </PROPERTY>
            <PROPERTY>
            metrics/bw-ft
            </PROPERTY>
            <PROPERTY>
            aero/bi2vel
            </PROPERTY>
            <PROPERTY>
            velocities/r-aero-rad_sec
            </PROPERTY>
            <TABLE>
              <INDEPENDENTVAR LOOKUP="row">
              fcs/flap-pos-deg
              </INDEPENDENTVAR>
              <TABLEDATA>
              0.0000  0.0798
                             30      0.1246
              </TABLEDATA>
            </TABLE>
            <TABLE>
            <!--
                            stall and spin (3):
                            yaw effect
                        -->
              <INDEPENDENTVAR LOOKUP="row">
              aero/alpha-wing-rad
              </INDEPENDENTVAR>
              <INDEPENDENTVAR LOOKUP="column">
              velocities/r-aero-rad_sec
              </INDEPENDENTVAR>
              <INDEPENDENTVAR LOOKUP="table">
              aero/stall-hyst-norm
              </INDEPENDENTVAR>
              <TABLEDATA BREAKPOINT="0">
              -0.15  -0.1   0    0.1   0.15
                            0.279    1      1     1    1     1
                            0.297    35     30    1    30    35
                            0.5      5      5     1    5     5
              </TABLEDATA>
              <TABLEDATA BREAKPOINT="1">
              -0.15  -0.1   0    0.1   0.15
                            0.297    35     30    1    30    35
                            0.5      5      5     1    5     5
              </TABLEDATA>
            </TABLE>
          </PRODUCT>
        </FUNCTION>
        <FUNCTION NAME="aero/coefficient/ClDa">
          <DESCRIPTION>
          Roll_moment_due_to_aileron
          </DESCRIPTION>
          <PRODUCT>
          <!--
                        stall and spin (4):
                        less efficient ailerons
                    -->
            <PROPERTY>
            aero/qbar-psf
            </PROPERTY>
            <PROPERTY>
            metrics/Sw-sqft
            </PROPERTY>
            <PROPERTY>
            metrics/bw-ft
            </PROPERTY>
            <PROPERTY>
            fcs/aileron-pos-rad-avgd
            </PROPERTY>
            <VALUE>
            0.229
            </VALUE>
            <TABLE>
              <INDEPENDENTVAR LOOKUP="row">
              aero/alpha-wing-rad
              </INDEPENDENTVAR>
              <INDEPENDENTVAR LOOKUP="column">
              aero/stall-hyst-norm
              </INDEPENDENTVAR>
              <TABLEDATA>
              0     1
                            0.279    1     0.3
                            0.297    0.3   0.3
                            0.611   -0.1  -0.1
              </TABLEDATA>
            </TABLE>
            <TABLE>
              <INDEPENDENTVAR>
              aero/function/total-wing-damage
              </INDEPENDENTVAR>
              <TABLEDATA>
              0.0000  1
                            1.0000  0
              </TABLEDATA>
            </TABLE>
          </PRODUCT>
        </FUNCTION>
        <FUNCTION NAME="aero/coefficient/Cldr">
          <DESCRIPTION>
          Roll_moment_due_to_rudder
          </DESCRIPTION>
          <PRODUCT>
            <PROPERTY>
            aero/qbar-psf
            </PROPERTY>
            <PROPERTY>
            metrics/Sw-sqft
            </PROPERTY>
            <PROPERTY>
            metrics/bw-ft
            </PROPERTY>
            <PROPERTY>
            fcs/rudder-pos-rad
            </PROPERTY>
            <VALUE>
            0.0147
            </VALUE>
          </PRODUCT>
        </FUNCTION>
        <FUNCTION NAME="aero/coefficient/Cllwdmg">
          <DESCRIPTION>
          Roll_moment_due_to_damaged_left_wing
          </DESCRIPTION>
          <PRODUCT>
            <PROPERTY>
            aero/qbar-psf
            </PROPERTY>
            <PROPERTY>
            metrics/Sw-sqft
            </PROPERTY>
            <PROPERTY>
            metrics/bw-ft
            </PROPERTY>
            <PROPERTY>
            wing-damage/left-wing
            </PROPERTY>
            <VALUE>
            -0.3
            </VALUE>
          </PRODUCT>
        </FUNCTION>
        <FUNCTION NAME="aero/coefficient/Clrwdmg">
          <DESCRIPTION>
          Roll_moment_due_to_damaged_right_wing
          </DESCRIPTION>
          <PRODUCT>
            <PROPERTY>
            aero/qbar-psf
            </PROPERTY>
            <PROPERTY>
            metrics/Sw-sqft
            </PROPERTY>
            <PROPERTY>
            metrics/bw-ft
            </PROPERTY>
            <PROPERTY>
            wing-damage/right-wing
            </PROPERTY>
            <VALUE>
            0.3
            </VALUE>
          </PRODUCT>
        </FUNCTION>
      </AXIS>
      <AXIS NAME="PITCH">
        <FUNCTION NAME="aero/coefficient/Cmo">
          <DESCRIPTION>
          Pitching_moment_at_zero_alpha
          </DESCRIPTION>
          <PRODUCT>
            <PROPERTY>
            aero/qbar-psf
            </PROPERTY>
            <PROPERTY>
            metrics/Sw-sqft
            </PROPERTY>
            <PROPERTY>
            metrics/cbarw-ft
            </PROPERTY>
            <VALUE>
            0.1
            </VALUE>
          </PRODUCT>
        </FUNCTION>
        <FUNCTION NAME="aero/coefficient/Cmalpha">
          <DESCRIPTION>
          Pitch_moment_due_to_alpha
          </DESCRIPTION>
          <PRODUCT>
          <!--
                        stall and spin (5):
                        horizontal tail stall (for flat spin)
                    -->
            <PROPERTY>
            aero/qbar-psf
            </PROPERTY>
            <PROPERTY>
            metrics/Sw-sqft
            </PROPERTY>
            <PROPERTY>
            metrics/cbarw-ft
            </PROPERTY>
            <SIN>
              <PROPERTY>
              aero/alpha-rad
              </PROPERTY>
            </SIN>
            <VALUE>
            -1.8
            </VALUE>
            <TABLE>
              <INDEPENDENTVAR LOOKUP="row">
              aero/alpha-deg
              </INDEPENDENTVAR>
              <TABLEDATA>
              20    1
                            25    0.6
                            35    0.4
                            45    0.5
                            55    0.4
                            65    0.2
                            90    0.1
              </TABLEDATA>
            </TABLE>
          </PRODUCT>
        </FUNCTION>
        <FUNCTION NAME="aero/coefficient/Cmq">
          <DESCRIPTION>
          Pitch_moment_due_to_pitch_rate
          </DESCRIPTION>
          <PRODUCT>
            <PROPERTY>
            aero/qbar-psf
            </PROPERTY>
            <PROPERTY>
            metrics/Sw-sqft
            </PROPERTY>
            <PROPERTY>
            metrics/cbarw-ft
            </PROPERTY>
            <PROPERTY>
            aero/ci2vel
            </PROPERTY>
            <PROPERTY>
            velocities/q-aero-rad_sec
            </PROPERTY>
            <VALUE>
            -12.4000
            </VALUE>
          </PRODUCT>
        </FUNCTION>
        <FUNCTION NAME="aero/coefficient/Cmadot">
          <DESCRIPTION>
          Pitch_moment_due_to_alpha_rate
          </DESCRIPTION>
          <PRODUCT>
            <PROPERTY>
            aero/qbar-psf
            </PROPERTY>
            <PROPERTY>
            metrics/Sw-sqft
            </PROPERTY>
            <PROPERTY>
            metrics/cbarw-ft
            </PROPERTY>
            <PROPERTY>
            aero/ci2vel
            </PROPERTY>
            <PROPERTY>
            aero/alphadot-rad_sec
            </PROPERTY>
            <VALUE>
            -7.2700
            </VALUE>
          </PRODUCT>
        </FUNCTION>
        <FUNCTION NAME="aero/coefficient/Cmde">
          <DESCRIPTION>
          Pitch_moment_due_to_elevator_deflection
          </DESCRIPTION>
          <PRODUCT>
          <!--
                        stall and spin (6):
                        elevator loss of efficiency when stalled
                    -->
            <PROPERTY>
            aero/function/qbar-induced-psf
            </PROPERTY>
            <PROPERTY>
            metrics/Sw-sqft
            </PROPERTY>
            <PROPERTY>
            metrics/cbarw-ft
            </PROPERTY>
            <PROPERTY>
            fcs/elevator-pos-rad
            </PROPERTY>
            <VALUE>
            -1.28
            </VALUE>
            <TABLE>
              <INDEPENDENTVAR LOOKUP="row">
              fcs/elevator-pos-rad
              </INDEPENDENTVAR>
              <INDEPENDENTVAR LOOKUP="column">
              aero/alpha-deg
              </INDEPENDENTVAR>
              <TABLEDATA>
              18  25   35     45     55      65      90
                            -0.49   1   0.5  0.2    0.1    0.1     0.1     0.1
                            0       1   0.6  0.3    0.15   0.1     0.1     0.1
                            0.40    1   0.9  0.8    0.7    0.6     0.5     0.4
              </TABLEDATA>
            </TABLE>
          </PRODUCT>
        </FUNCTION>
        <FUNCTION NAME="aero/coefficient/Cmdf">
          <DESCRIPTION>
          Delta_pitching_moment_due_to_flap_deflection
          </DESCRIPTION>
          <PRODUCT>
          <!-- tests, adjustments -->
            <PROPERTY>
            aero/qbar-psf
            </PROPERTY>
            <PROPERTY>
            metrics/Sw-sqft
            </PROPERTY>
            <PROPERTY>
            metrics/cbarw-ft
            </PROPERTY>
            <TABLE>
              <INDEPENDENTVAR>
              fcs/flap-pos-deg
              </INDEPENDENTVAR>
              <TABLEDATA>
              0.0000      0.0000
                            10.0000    -0.0654
                            20.0000    -0.0981
                            30.0000    -0.1140
              </TABLEDATA>
            </TABLE>
            <VALUE>
            0.7
            </VALUE>
          </PRODUCT>
        </FUNCTION>
      </AXIS>
      <AXIS NAME="YAW">
        <FUNCTION NAME="aero/coefficient/Cnb">
          <DESCRIPTION>
          Yaw_moment_due_to_beta
          </DESCRIPTION>
          <PRODUCT>
            <PROPERTY>
            aero/qbar-psf
            </PROPERTY>
            <PROPERTY>
            metrics/Sw-sqft
            </PROPERTY>
            <PROPERTY>
            metrics/bw-ft
            </PROPERTY>
            <TABLE>
              <INDEPENDENTVAR>
              aero/beta-rad
              </INDEPENDENTVAR>
              <TABLEDATA>
              -0.3490   -0.0205
                              0.0000    0.0000
                              0.3490    0.0205
              </TABLEDATA>
            </TABLE>
          </PRODUCT>
        </FUNCTION>
        <FUNCTION NAME="aero/coefficient/Cnspw">
          <DESCRIPTION>
          Yaw_moment_due_to_spiraling_propwash
          </DESCRIPTION>
          <PRODUCT>
            <PROPERTY>
            aero/function/qbar-propwash-psf
            </PROPERTY>
            <PROPERTY>
            metrics/Sw-sqft
            </PROPERTY>
            <PROPERTY>
            metrics/bw-ft
            </PROPERTY>
            <VALUE>
            -0.05
            </VALUE>
          </PRODUCT>
        </FUNCTION>
        <FUNCTION NAME="aero/coefficient/Cnr">
          <DESCRIPTION>
          Yaw_moment_due_to_yaw_rate
          </DESCRIPTION>
          <PRODUCT>
            <PROPERTY>
            aero/qbar-psf
            </PROPERTY>
            <PROPERTY>
            metrics/Sw-sqft
            </PROPERTY>
            <PROPERTY>
            metrics/bw-ft
            </PROPERTY>
            <PROPERTY>
            aero/bi2vel
            </PROPERTY>
            <PROPERTY>
            velocities/r-aero-rad_sec
            </PROPERTY>
            <VALUE>
            -0.0937
            </VALUE>
          </PRODUCT>
        </FUNCTION>
        <FUNCTION NAME="aero/coefficient/Cnrf">
        <!--
                    stall and spin (7):
                    Feedback loop on yaw rate for flat spin.
                    Accelerates the yaw rate when stalled, up to a self-maintained flat spin (like a dead leaf).
                    r-aero-rad_sec with non-zero coefficients mainly sets the max yawing rate, if attained.
                    The coefficients set the yaw moment, thus the speed too, and the flatness of the spin.
                    Too great coefficients give an divergent effect and a non-recoverable spin.
                    (tricky)
                -->
          <DESCRIPTION>
          Yaw_moment_due_to_flat_spin
          </DESCRIPTION>
          <PRODUCT>
            <PROPERTY>
            aero/qbar-psf
            </PROPERTY>
            <PROPERTY>
            metrics/Sw-sqft
            </PROPERTY>
            <PROPERTY>
            metrics/bw-ft
            </PROPERTY>
            <PROPERTY>
            aero/bi2vel
            </PROPERTY>
            <TABLE>
              <INDEPENDENTVAR LOOKUP="row">
              velocities/r-aero-rad_sec
              </INDEPENDENTVAR>
              <INDEPENDENTVAR LOOKUP="column">
              aero/alpha-wing-rad
              </INDEPENDENTVAR>
              <TABLEDATA>
              0.279 0.4
                            -15  0     0
                            -5   0     0
                            -3   0     -0.25
                            -1   0     0
                            0    0     0
                            1    0     0
                            3    0     0.25
                            5    0     0
                            15   0     0
              </TABLEDATA>
            </TABLE>
          </PRODUCT>
        </FUNCTION>
        <FUNCTION NAME="aero/coefficient/Cnda">
        <!--
                    stall and spin (8):
                    adverse yaw: can induce a adverse turn and spin when stalled
                -->
          <DESCRIPTION>
          Yaw_moment_due_to_aileron
          </DESCRIPTION>
          <PRODUCT>
            <PROPERTY>
            aero/qbar-psf
            </PROPERTY>
            <PROPERTY>
            metrics/Sw-sqft
            </PROPERTY>
            <PROPERTY>
            metrics/bw-ft
            </PROPERTY>
            <PROPERTY>
            fcs/aileron-pos-rad-avgd
            </PROPERTY>
            <TABLE>
              <INDEPENDENTVAR LOOKUP="row">
              aero/alpha-wing-rad
              </INDEPENDENTVAR>
              <INDEPENDENTVAR LOOKUP="column">
              aero/beta-rad
              </INDEPENDENTVAR>
              <TABLEDATA>
              -0.35        0           0.35
                            0       -0.0216      -0.0216     -0.0216
                            0.070   -0.039       -0.0786     -0.039
                            0.094   -0.025       -0.0504     -0.025
              </TABLEDATA>
            </TABLE>
            <TABLE>
              <INDEPENDENTVAR>
              aero/function/total-wing-damage
              </INDEPENDENTVAR>
              <TABLEDATA>
              0.0000  1
                            1.0000  0
              </TABLEDATA>
            </TABLE>
          </PRODUCT>
        </FUNCTION>
        <FUNCTION NAME="aero/coefficient/Cndr">
          <DESCRIPTION>
          Yaw_moment_due_to_rudder
          </DESCRIPTION>
          <PRODUCT>
            <PROPERTY>
            aero/function/qbar-induced-psf
            </PROPERTY>
            <PROPERTY>
            metrics/Sw-sqft
            </PROPERTY>
            <PROPERTY>
            metrics/bw-ft
            </PROPERTY>
            <PROPERTY>
            fcs/rudder-pos-rad
            </PROPERTY>
            <VALUE>
            -0.0645
            </VALUE>
          </PRODUCT>
        </FUNCTION>
      </AXIS>
    </AERODYNAMICS>
    <EXTERNAL_REACTIONS>
    <!-- Tiedowns use body frame (x positive forward, y positive
             right, z positive down).
        -->
      <FORCE NAME="hydro-X" FRAME="LOCAL">
        <LOCATION UNIT="IN">
          <X>
          32.6
          </X>
          <Y>
          0
          </Y>
          <Z>
          38.5
          </Z>
        </LOCATION>
        <DIRECTION>
          <X>
          1.0
          </X>
          <Y>
          0.0
          </Y>
          <Z>
          0.0
          </Z>
        </DIRECTION>
      </FORCE>
      <FORCE NAME="hydro-Y" FRAME="LOCAL">
        <LOCATION UNIT="IN">
          <X>
          32.6
          </X>
          <Y>
          0
          </Y>
          <Z>
          38.5
          </Z>
        </LOCATION>
        <DIRECTION>
          <X>
          0.0
          </X>
          <Y>
          1.0
          </Y>
          <Z>
          0.0
          </Z>
        </DIRECTION>
      </FORCE>
      <FORCE NAME="hydro-Z" FRAME="LOCAL">
        <LOCATION UNIT="IN">
          <X>
          32.6
          </X>
          <Y>
          0
          </Y>
          <Z>
          38.5
          </Z>
        </LOCATION>
        <DIRECTION>
          <X>
          0.0
          </X>
          <Y>
          0.0
          </Y>
          <Z>
          -1.0
          </Z>
        </DIRECTION>
      </FORCE>
      <FORCE NAME="hydro-pitch[0]" FRAME="LOCAL">
        <LOCATION UNIT="IN">
          <X>
          20.6
          </X>
          <Y>
          0
          </Y>
          <Z>
          38.5
          </Z>
        </LOCATION>
        <DIRECTION>
          <X>
          0.0
          </X>
          <Y>
          0.0
          </Y>
          <Z>
          -1.0
          </Z>
        </DIRECTION>
      </FORCE>
      <FORCE NAME="hydro-pitch[1]" FRAME="LOCAL">
        <LOCATION UNIT="IN">
          <X>
          44.6
          </X>
          <Y>
          0
          </Y>
          <Z>
          38.5
          </Z>
        </LOCATION>
        <DIRECTION>
          <X>
          0.0
          </X>
          <Y>
          0.0
          </Y>
          <Z>
          -1.0
          </Z>
        </DIRECTION>
      </FORCE>
      <FORCE NAME="hydro-yaw[0]" FRAME="BODY">
        <LOCATION UNIT="IN">
          <X>
          32.6
          </X>
          <Y>
          -12.0
          </Y>
          <Z>
          38.5
          </Z>
        </LOCATION>
        <DIRECTION>
          <X>
          1.0
          </X>
          <Y>
          0.0
          </Y>
          <Z>
          0.0
          </Z>
        </DIRECTION>
      </FORCE>
      <FORCE NAME="hydro-yaw[1]" FRAME="BODY">
        <LOCATION UNIT="IN">
          <X>
          32.6
          </X>
          <Y>
          12.0
          </Y>
          <Z>
          38.5
          </Z>
        </LOCATION>
        <DIRECTION>
          <X>
          1.0
          </X>
          <Y>
          0.0
          </Y>
          <Z>
          0.0
          </Z>
        </DIRECTION>
      </FORCE>
      <FORCE NAME="hydro-roll[0]" FRAME="LOCAL">
        <LOCATION UNIT="IN">
          <X>
          32.6
          </X>
          <Y>
          -12.0
          </Y>
          <Z>
          38.5
          </Z>
        </LOCATION>
        <DIRECTION>
          <X>
          0.0
          </X>
          <Y>
          0.0
          </Y>
          <Z>
          -1.0
          </Z>
        </DIRECTION>
      </FORCE>
      <FORCE NAME="hydro-roll[1]" FRAME="LOCAL">
        <LOCATION UNIT="IN">
          <X>
          32.6
          </X>
          <Y>
          12.0
          </Y>
          <Z>
          38.5
          </Z>
        </LOCATION>
        <DIRECTION>
          <X>
          0.0
          </X>
          <Y>
          0.0
          </Y>
          <Z>
          -1.0
          </Z>
        </DIRECTION>
      </FORCE>
      <FORCE NAME="tiedown-left" FRAME="BODY">
        <LOCATION UNIT="M">
          <X>
          0.1188
          </X>
          <Y>
          -2.2998
          </Y>
          <Z>
          0.4008
          </Z>
        </LOCATION>
        <DIRECTION>
          <X>
          0.0
          </X>
          <Y>
          0.0
          </Y>
          <Z>
          1.0
          </Z>
        </DIRECTION>
      </FORCE>
      <FORCE NAME="tiedown-right" FRAME="BODY">
        <LOCATION UNIT="M">
          <X>
          0.1188
          </X>
          <Y>
          2.2998
          </Y>
          <Z>
          0.4008
          </Z>
        </LOCATION>
        <DIRECTION>
          <X>
          0.0
          </X>
          <Y>
          0.0
          </Y>
          <Z>
          1.0
          </Z>
        </DIRECTION>
      </FORCE>
      <FORCE NAME="tiedown-tail" FRAME="BODY">
        <LOCATION UNIT="M">
          <X>
          4.7116
          </X>
          <Y>
          0.0000
          </Y>
          <Z>
          -0.6663
          </Z>
        </LOCATION>
        <DIRECTION>
          <X>
          0.0
          </X>
          <Y>
          0.0
          </Y>
          <Z>
          1.0
          </Z>
        </DIRECTION>
      </FORCE>
      <FORCE NAME="ai-wake" FRAME="BODY">
        <LOCATION UNIT="IN">
        <!-- Center of the main wing leading edge -->
          <X>
          32.0
          </X>
          <Y>
          0.0
          </Y>
          <Z>
          52.5
          </Z>
        </LOCATION>
        <DIRECTION>
        <!-- These are dummy values. They are ignored by FlightGear.
                     Their purpose is to avoid JSBSim display warning messages
                     about direction not being specified.
                     -->
          <X>
          1.0
          </X>
          <Y>
          0.0
          </Y>
          <Z>
          0.0
          </Z>
        </DIRECTION>
      </FORCE>
      <MOMENT NAME="ai-wake" FRAME="BODY">
        <DIRECTION>
        <!-- These are dummy values. They are ignored by FlightGear.
                     Their purpose is to avoid JSBSim display warning messages
                     about direction not being specified.
                     -->
          <X>
          1.0
          </X>
          <Y>
          0.0
          </Y>
          <Z>
          0.0
          </Z>
        </DIRECTION>
      </MOMENT>
      <FORCE NAME="mooring-north" FRAME="LOCAL">
        <LOCATION UNIT="FT">
          <X>
          0.0
          </X>
          <Y>
          0.0
          </Y>
          <Z>
          0.0
          </Z>
        </LOCATION>
        <DIRECTION>
          <X>
          1.0
          </X>
          <Y>
          0.0
          </Y>
          <Z>
          0.0
          </Z>
        </DIRECTION>
      </FORCE>
      <FORCE NAME="mooring-east" FRAME="LOCAL">
        <LOCATION UNIT="FT">
          <X>
          0.0
          </X>
          <Y>
          0.0
          </Y>
          <Z>
          0.0
          </Z>
        </LOCATION>
        <DIRECTION>
          <X>
          0.0
          </X>
          <Y>
          1.0
          </Y>
          <Z>
          0.0
          </Z>
        </DIRECTION>
      </FORCE>
      <FORCE NAME="mooring-down" FRAME="LOCAL">
        <LOCATION UNIT="FT">
          <X>
          0.0
          </X>
          <Y>
          0.0
          </Y>
          <Z>
          1.0
          </Z>
        </LOCATION>
        <DIRECTION>
          <X>
          1.0
          </X>
          <Y>
          0.0
          </Y>
          <Z>
          0.0
          </Z>
        </DIRECTION>
      </FORCE>
    </EXTERNAL_REACTIONS>
    <system FILE="bushkit"/>
    <system FILE="fuel"/>
    <system FILE="c172p-engine"/>
    <system FILE="c172p-skis"/>
    <system FILE="hydrodynamics"/>
    <system FILE="c172p-hydrodynamics"/>
    <system FILE="c172p-ground-effects"/>
    <system FILE="c172p-damage"/>
    <system FILE="c172p-sounds"/>
    <system FILE="c172p-heat"/>
    <system FILE="external-heat"/>
    <system FILE="indicated-airspeed"/>
    <system FILE="mooring-jsbsim"/>
  </FDM_CONFIG>
